// ***************************** AnyMoCap ***********************************
#include "../../../libdef.any"
#include "../../../BVH_OptimizeOrigin.any"

// Enter and edit data/settings shared by all subjects and trials
#path MOCAP_LAB_SPECIFIC_DATA "../../../LabSpecificData.any"


// Enter and edit data shared by all trials from this subject
#path MOCAP_SUBJECT_SPECIFIC_DATA "../SubjectSpecificData.any"


// Enter and edit data specific to this trial:
#path MOCAP_TRIAL_SPECIFIC_DATA "TrialSpecificData.any"

// Include the AnyMoCap Framwork
#include "<ANYMOCAP_MODEL>"


Main = {
//  BVH_OptimizeOrigin BVH_Origin_Modifier (
//    HUMAN_SEG = "LHAND",
//    ACTIVE_TIME_START = 1.10,
//    ACTIVE_TIME_END = 1.50
//    ) =
//{
//      TARGET_Position = {0.2,1.28,0.5};
//      TARGET_Orientation= RotMat(0*pi/180,x)
//                    *RotMat(40*pi/180,y)
//                        *RotMat(90*pi/180,z);
//
//      Settings.InitialGuess = {0.0,0,0,0,0*pi/180,0};
//
//  };

//  BVH_OptimizeOrigin BVH_Origin_Modifier (
//    HUMAN_SEG = "RHAND",
//    ACTIVE_TIME_START = 1.25,
//    ACTIVE_TIME_END = 1.50
//    ) =
//{
//      TARGET_Position = {-0.5,1.37,0.2};
//      TARGET_Orientation= RotMat(-20*pi/180,x)
//                    *RotMat(-180*pi/180,y)
//                        *RotMat(-90*pi/180,z);
//
//      Settings.InitialGuess = {0.0,0,0,0,0,0};
//
//  };

 BVH_OptimizeOrigin BVH_Origin_Modifier (
    HUMAN_SEG = "LFOOT",
    ACTIVE_TIME_START = 0,
    ACTIVE_TIME_END = 0.4
    ) =
{
      TARGET_Position = {0.5,0,0.5};
      TARGET_Orientation= RotMat(0*pi/180,x)
                    *RotMat(60*pi/180,y)
                        *RotMat(0*pi/180,z);

      Settings.InitialGuess = {0.40,0,0.5,0,-30*pi/180,0};

  };

// BVH_OptimizeOrigin BVH_Origin_Modifier (
//    HUMAN_SEG = "RFOOT",
////    OPT_LIN_X = 1, OPT_LIN_Y = 1, OPT_LIN_Z = 1,
////OPT_ROT_X = 1, OPT_ROT_Y = 1, OPT_ROT_Z = 1,
//
//    ACTIVE_TIME_START = 1.0,
//    ACTIVE_TIME_END = 1.4
//    ) =
//{
//
////  TARGET_Position = {-0.2508042, 0.06953926 -0.06310187, 0.5071104};
////      TARGET_Orientation= {{0.9867961, 0.1478207, 0.06620117},
////{-0.1446556, 0.9882018, -0.0503178},
////{-0.07285813, 0.04007704, 0.9965368}}*RotMat(pi/2,y);
//
//      TARGET_Position = {0.0,0,0.5};
//      TARGET_Orientation= RotMat(0*pi/180,x)
//                    *RotMat(120*pi/180,y)
//                        *RotMat(0*pi/180,z);
//
//      Settings.InitialGuess = {0.5,0,0.5,0,30*pi/180,0};
//
//  };

//Main.HumanModel.BodyModel.Right.Leg.Seg.Shank.RAJC = {
//AnyRefNode Node0 = {sRel = {0,-0.06310187,0.0};
//AnyDrawRefFrame drw = {};};
//};

};// Main
