//This is the definition of the strength of the grip force of the hand
//The current strength is a guesstimate
MuscleModels = {
  AnyVar HandGloveMomentStrength = 30; //Guesstimate!
};

Joints = {
  AnyRecruitedActuator RotMuscleZ_1 = {
    AnyKinMeasure& ref = .HandGloveRotZ;
    Strength = ..MuscleModels.HandGloveMomentStrength;
    Type = NonNegative;
    SET_DEFAULT_ACTUATOR_VOLUME;
  };
  AnyRecruitedActuator RotMuscleZ_2 = {
    AnyKinMeasure& ref = .HandGloveRotZ;
    Strength = ..MuscleModels.HandGloveMomentStrength;
    Type = NonPositive;
    SET_DEFAULT_ACTUATOR_VOLUME;
  };

  AnyRecruitedActuator RotMuscleY_1 = {
    AnyKinMeasure& ref = .HandGloveRotY;
    Strength = ..MuscleModels.HandGloveMomentStrength;
    Type = NonNegative;
    SET_DEFAULT_ACTUATOR_VOLUME;
  };
  AnyRecruitedActuator RotMuscleY_2 = {
    AnyKinMeasure& ref = .HandGloveRotY;
    Strength = ..MuscleModels.HandGloveMomentStrength;
    Type = NonPositive;
    SET_DEFAULT_ACTUATOR_VOLUME;
  };

  AnyRecruitedActuator RotMuscleX_1 = {
    AnyKinMeasure& ref = .HandGloveRotX;
    Strength = ..MuscleModels.HandGloveMomentStrength;
    Type = NonNegative;
    SET_DEFAULT_ACTUATOR_VOLUME;
  };
  AnyRecruitedActuator RotMuscleX_2 = {
    AnyKinMeasure& ref = .HandGloveRotX;
    Strength = ..MuscleModels.HandGloveMomentStrength;
    Type = NonPositive;
    SET_DEFAULT_ACTUATOR_VOLUME;
  };
};
