// VU study
// http: //www.fbw.vu.nl/research/Lijn_A4/shoulder/overview.htm

// Note: PCSA has been divided according to no. of muscle elements
// Yamaguchi
// A survey of human musculotendon actuator parameters
// G.T. Yamaguchi, A.G. Sawa, D.W. Moran, M.J. Fessler, and J.M. Winters
// Multiple Muscle Systems: Biomechanics and Movement Organization
// J.M. Winters and S.L.-T. Woo (eds.) 1990 Springer- verlag, New York

// Juul-Kristensen2000
// Muscle sizes and moment arms of the rotator cuff muscles determined by magnetic resonance imaging
// B. Juul-kristensen, F. Bojsen-Moeller, L. Finsen, J. Eriksson, G. Johansson, F. Staahlberg, C. Ekdahl
// Cell Tissues Organs 2000, 214-222

// Kamibayashi1998
// Morphometry of human neck muscles
// Lynne K. Kamibayashi, Frances J.R. Richmond
// Spine Vol. 23,No.12, pp. 1314-1323, 1998

// Numbers used by the simple muscle models for the muscles in the forearm
// Veeger1997
// Parameters for modelling the upper extremity
// H.E.J. Veeger, Bing Yu, Kai-Nan and R. H. Rozendal
// J. Biomechanics, Vol.30, No. 6, pp. 647-652, 1997

//Jacobson
//Jacobson, M. D., R. Raab, B. M. Fazeli, R. A. Abrams, M. J. Botte, and R. L. Lieber.
//Architectural design of the human intrinsic hand muscles.
// J. Hand Surg. [Am.] 17:804809, 1992.

//Lieber1
//Lieber, R. L., M. D. Jacobson, B. M. Fazeli, R. A. Abrams, and M. J. Botte.
//Architecture of selected muscles of the arm and forearm: Anatomy and implications for tendon transfer.
//J. Hand Surg. [Am.] 17:787-798, 1992.

//Lieber2
//Lieber, R. L., B. M. Fazeli, and M. J. Botte.
//Architecture of selected wrist flexor and extensor muscles.
//J. Hand Surg. [Am.] 15:244-250, 1990.

//Murray
//Muray, W.M.,T.S. Buchanan, and S.L. Delp.
//Scaling of peak moment arms with the elbow and forearm position
//j. Biomech. Vol. 28, pp. 513-525, 1995
//
//AnyFolder SubjectMusPar = {
//   AnyFolder biceps_brachii_caput_breve =
//   {
//      AnyVar MuscleElemAmount = 1;
//      AnyVar MuscleVolumeOrg = 20;
//      AnyVar PennentionAngle =
//      AnyVar MuscleVolume = MuscleVolumeFactor * MuscleVolumeOrg;
//      AnyVar MuscleVolumeFactor =1;
//
//
//
//   };
//
//
//
//};

AnyMuscleModel biceps_brachii_caput_breve = {
  AnyVar PCSA = 172.000000; // mm^2 VU study
  F0 = Main.Model.ke_1* Main.Model.ke_2*Main.Model.ke_3*Main.Model.ke_4*Main.Model.ke_5*Main.Model.ke_6*Main.Model.k_glb*Main.Model.k1*.StrengthScaleHumerus*PCSA*.ConstParam.MusStress;
};

AnyMuscleModel biceps_brachii_caput_longum = {
  AnyVar PCSA = 178.000000; // mm^2 VU study
  F0 = Main.Model.ke_1* Main.Model.ke_2*Main.Model.ke_3*Main.Model.ke_4*Main.Model.ke_5*Main.Model.ke_6*Main.Model.k_glb*Main.Model.k2*.StrengthScaleHumerus*PCSA*.ConstParam.MusStress;
};

AnyMuscleModel coracobrachialis_1 = {
  AnyVar Volume= 0.5*46.500000/10^6; // m^3 mayo k2_2
  AnyVar MuscleBellyLength = 0.250; // m mayo k2_2
  AnyVar PCSA = Volume/(MuscleBellyLength*cos(5*pi/180));
  F0 = Main.Model.ke_1* Main.Model.ke_2*Main.Model.ke_3*Main.Model.ke_4*Main.Model.ke_5*Main.Model.ke_6*Main.Model.k_glb*Main.Model.k3*.StrengthScaleHumerus*PCSA*.ConstParam.MusStressForearm;
};

AnyMuscleModel coracobrachialis_2 = {
  AnyVar Volume= 0.5*46.500000/10^6; // m^3 mayo k2_2
  AnyVar MuscleBellyLength = 0.250; // m mayo k2_2
  AnyVar PCSA = Volume/(MuscleBellyLength*cos(5*pi/180));
  F0 = Main.Model.ke_1* Main.Model.ke_2*Main.Model.ke_3*Main.Model.ke_4*Main.Model.ke_5*Main.Model.ke_6*Main.Model.k_glb*Main.Model.k4*.StrengthScaleHumerus*PCSA*.ConstParam.MusStressForearm;
};

AnyMuscleModel coracobrachialis_3 = {
  AnyVar Volume= 0.5*46.500000/10^6; // m^3 mayo k2_2
  AnyVar MuscleBellyLength = 0.250; // m mayo k2_2
  AnyVar PCSA = Volume/(MuscleBellyLength*cos(5*pi/180));
  F0 = Main.Model.ke_1* Main.Model.ke_2*Main.Model.ke_3*Main.Model.ke_4*Main.Model.ke_5*Main.Model.ke_6*Main.Model.k_glb*Main.Model.k5*.StrengthScaleHumerus*PCSA*.ConstParam.MusStressForearm;
};

AnyMuscleModel coracobrachialis_4 = {
  AnyVar Volume= 0.5*46.500000/10^6; // m^3 mayo k2_2
  AnyVar MuscleBellyLength = 0.250; // m mayo k2_2
  AnyVar PCSA = Volume/(MuscleBellyLength*cos(5*pi/180));
  F0 = Main.Model.ke_1* Main.Model.ke_2*Main.Model.ke_3*Main.Model.ke_4*Main.Model.ke_5*Main.Model.ke_6*Main.Model.k_glb*Main.Model.k6*.StrengthScaleHumerus*PCSA*.ConstParam.MusStressForearm;
};

AnyMuscleModel coracobrachialis_5 = {
  AnyVar Volume= 0.5*46.500000/10^6; // m^3 mayo k2_2
  AnyVar MuscleBellyLength = 0.250; // m mayo k2_2
  AnyVar PCSA = Volume/(MuscleBellyLength*cos(5*pi/180));
  F0 = Main.Model.ke_1* Main.Model.ke_2*Main.Model.ke_3*Main.Model.ke_4*Main.Model.ke_5*Main.Model.ke_6*Main.Model.k_glb*Main.Model.k7*.StrengthScaleHumerus*PCSA*.ConstParam.MusStressForearm;
};

AnyMuscleModel coracobrachialis_6 = {
  AnyVar Volume= 0.5*46.500000/10^6; // m^3 mayo k2_2
  AnyVar MuscleBellyLength = 0.250; // m mayo k2_2
  AnyVar PCSA = Volume/(MuscleBellyLength*cos(5*pi/180));
  F0 = Main.Model.ke_1* Main.Model.ke_2*Main.Model.ke_3*Main.Model.ke_4*Main.Model.ke_5*Main.Model.ke_6*Main.Model.k_glb*Main.Model.k8*.StrengthScaleHumerus*PCSA*.ConstParam.MusStressForearm;
};


//The distribution of the strength on the deltoid muscle has been
//modified manually, the sum of PSCA is unchanged and according to data
//2460 mm^2
AnyVar f=0.8;

#if BM_ARM_DELTOID_WRAPPING == OFF
AnyMuscleModel deltoideus_scapular_part_1 = {
  AnyVar PCSA = .f*160.000000; // mm^2 VU study
  F0 = Main.Model.ke_1* Main.Model.ke_2*Main.Model.ke_3*Main.Model.ke_4*Main.Model.ke_5*Main.Model.ke_6*Main.Model.k_glb*Main.Model.k9*.StrengthScaleHumerus*PCSA*.ConstParam.MusStress;
};

AnyMuscleModel deltoideus_scapular_part_2 = {
  AnyVar PCSA = .f*180.000000; // mm^2 VU study
  F0 = Main.Model.ke_1* Main.Model.ke_2*Main.Model.ke_3*Main.Model.ke_4*Main.Model.ke_5*Main.Model.ke_6*Main.Model.k_glb*Main.Model.k10*.StrengthScaleHumerus*PCSA*.ConstParam.MusStress;
};

AnyMuscleModel deltoideus_scapular_part_3 = {
  AnyVar PCSA = .f*195.000000; // mm^2 VU study
  F0 = Main.Model.ke_1* Main.Model.ke_2*Main.Model.ke_3*Main.Model.ke_4*Main.Model.ke_5*Main.Model.ke_6*Main.Model.k_glb*Main.Model.k11*.StrengthScaleHumerus*PCSA*.ConstParam.MusStress;
};

AnyMuscleModel deltoideus_scapular_part_4 = {
  AnyVar PCSA = .f*215.000000; // mm^2 VU study
  F0 = Main.Model.ke_1* Main.Model.ke_2*Main.Model.ke_3*Main.Model.ke_4*Main.Model.ke_5*Main.Model.ke_6*Main.Model.k_glb*Main.Model.k12*.StrengthScaleHumerus*PCSA*.ConstParam.MusStress;
};

AnyMuscleModel deltoideus_scapular_part_5 = {
  AnyVar PCSA = .f*230.000000; // mm^2 VU study
  F0 = Main.Model.ke_1* Main.Model.ke_2*Main.Model.ke_3*Main.Model.ke_4*Main.Model.ke_5*Main.Model.ke_6*Main.Model.k_glb*Main.Model.k13*.StrengthScaleHumerus*PCSA*.ConstParam.MusStress;
};

AnyMuscleModel deltoideus_scapular_part_6 = {
  AnyVar PCSA = .f*250.000000; // mm^2 VU study
  F0 = Main.Model.ke_1* Main.Model.ke_2*Main.Model.ke_3*Main.Model.ke_4*Main.Model.ke_5*Main.Model.ke_6*Main.Model.k_glb*Main.Model.k14*.StrengthScaleHumerus*PCSA*.ConstParam.MusStress;
};
AnyVar fc=1.2;
AnyMuscleModel deltoideus_clavicular_part_1 = {
  AnyVar PCSA = .fc*225.000000; // mm^2 VU study
  F0 = Main.Model.ke_1* Main.Model.ke_2*Main.Model.ke_3*Main.Model.ke_4*Main.Model.ke_5*Main.Model.ke_6*Main.Model.k_glb*Main.Model.k15*.StrengthScaleHumerus*PCSA*.ConstParam.MusStress;
};

AnyMuscleModel deltoideus_clavicular_part_2 = {
  AnyVar PCSA = .fc*225.000000; // mm^2 VU study
  F0 = Main.Model.ke_1* Main.Model.ke_2*Main.Model.ke_3*Main.Model.ke_4*Main.Model.ke_5*Main.Model.ke_6*Main.Model.k_glb*Main.Model.k16*.StrengthScaleHumerus*PCSA*.ConstParam.MusStress;
};

AnyMuscleModel deltoideus_clavicular_part_3 = {
  AnyVar PCSA = .fc*225.000000; // mm^2 VU study
  F0 = Main.Model.ke_1* Main.Model.ke_2*Main.Model.ke_3*Main.Model.ke_4*Main.Model.ke_5*Main.Model.ke_6*Main.Model.k_glb*Main.Model.k17*.StrengthScaleHumerus*PCSA*.ConstParam.MusStress;
};

AnyMuscleModel deltoideus_clavicular_part_4 = {
  AnyVar PCSA = .fc*185.000000; // mm^2 VU study
  F0 = Main.Model.ke_1* Main.Model.ke_2*Main.Model.ke_3*Main.Model.ke_4*Main.Model.ke_5*Main.Model.ke_6*Main.Model.k_glb*Main.Model.k18*.StrengthScaleHumerus*PCSA*.ConstParam.MusStress;
};

AnyMuscleModel deltoideus_clavicular_part_5 = {
  AnyVar PCSA = .fc*185.000000; // mm^2 VU study
  F0 = Main.Model.ke_1* Main.Model.ke_2*Main.Model.ke_3*Main.Model.ke_4*Main.Model.ke_5*Main.Model.ke_6*Main.Model.k_glb*Main.Model.k19*.StrengthScaleHumerus*PCSA*.ConstParam.MusStress;
};

AnyMuscleModel deltoideus_clavicular_part_6 = {
  AnyVar PCSA = .fc*185.000000; // mm^2 VU study
  F0 = Main.Model.ke_1* Main.Model.ke_2*Main.Model.ke_3*Main.Model.ke_4*Main.Model.ke_5*Main.Model.ke_6*Main.Model.k_glb*Main.Model.k20*.StrengthScaleHumerus*PCSA*.ConstParam.MusStress;
};

#else
AnyMuscleModel deltoideus_posterior_part_1 = {
  AnyVar PCSA = .f*160.000000; // mm^2 VU study
  F0 = Main.Model.ke_1* Main.Model.ke_2*Main.Model.ke_3*Main.Model.ke_4*Main.Model.ke_5*Main.Model.ke_6*Main.Model.k_glb*Main.Model.k21*.StrengthScaleHumerus*PCSA*.ConstParam.MusStress;
};

AnyMuscleModel deltoideus_posterior_part_2 = {
  AnyVar PCSA = .f*180.000000; // mm^2 VU study
  F0 = Main.Model.ke_1* Main.Model.ke_2*Main.Model.ke_3*Main.Model.ke_4*Main.Model.ke_5*Main.Model.ke_6*Main.Model.k_glb*Main.Model.k22*.StrengthScaleHumerus*PCSA*.ConstParam.MusStress;
};

AnyMuscleModel deltoideus_posterior_part_3 = {
  AnyVar PCSA = .f*180.000000; // mm^2 VU study
  F0 = Main.Model.ke_1* Main.Model.ke_2*Main.Model.ke_3*Main.Model.ke_4*Main.Model.ke_5*Main.Model.ke_6*Main.Model.k_glb*Main.Model.k23*.StrengthScaleHumerus*PCSA*.ConstParam.MusStress;
};

AnyMuscleModel deltoideus_posterior_part_4 = {
  AnyVar PCSA = .f*180.000000; // mm^2 VU study
  F0 = Main.Model.ke_1* Main.Model.ke_2*Main.Model.ke_3*Main.Model.ke_4*Main.Model.ke_5*Main.Model.ke_6*Main.Model.k_glb*Main.Model.k24*.StrengthScaleHumerus*PCSA*.ConstParam.MusStress;
};

AnyMuscleModel deltoideus_lateral_part_1 = {
  AnyVar PCSA = .f*195.000000; // mm^2 VU study
  F0 = Main.Model.ke_1* Main.Model.ke_2*Main.Model.ke_3*Main.Model.ke_4*Main.Model.ke_5*Main.Model.ke_6*Main.Model.k_glb*Main.Model.k25*.StrengthScaleHumerus*PCSA*.ConstParam.MusStress;
};

AnyMuscleModel deltoideus_lateral_part_2 = {
  AnyVar PCSA = .f*215.000000; // mm^2 VU study
  F0 = Main.Model.ke_1* Main.Model.ke_2*Main.Model.ke_3*Main.Model.ke_4*Main.Model.ke_5*Main.Model.ke_6*Main.Model.k_glb*Main.Model.k26*.StrengthScaleHumerus*PCSA*.ConstParam.MusStress;
};

AnyMuscleModel deltoideus_lateral_part_3 = {
  AnyVar PCSA = .f*215.000000; // mm^2 VU study
  F0 = Main.Model.ke_1* Main.Model.ke_2*Main.Model.ke_3*Main.Model.ke_4*Main.Model.ke_5*Main.Model.ke_6*Main.Model.k_glb*Main.Model.k27*.StrengthScaleHumerus*PCSA*.ConstParam.MusStress;
};

AnyMuscleModel deltoideus_lateral_part_4 = {
  AnyVar PCSA = .f*230.000000; // mm^2 VU study
  F0 = Main.Model.ke_1* Main.Model.ke_2*Main.Model.ke_3*Main.Model.ke_4*Main.Model.ke_5*Main.Model.ke_6*Main.Model.k_glb*Main.Model.k28*.StrengthScaleHumerus*PCSA*.ConstParam.MusStress;
};

AnyVar fc=1.2;
AnyMuscleModel deltoideus_anterior_part_1 = {
  AnyVar PCSA = .fc*225.000000; // mm^2 VU study
  F0 = Main.Model.ke_1* Main.Model.ke_2*Main.Model.ke_3*Main.Model.ke_4*Main.Model.ke_5*Main.Model.ke_6*Main.Model.k_glb*Main.Model.k29*.StrengthScaleHumerus*PCSA*.ConstParam.MusStress;
};

AnyMuscleModel deltoideus_anterior_part_2 = {
  AnyVar PCSA = .fc*225.000000; // mm^2 VU study
  F0 = Main.Model.ke_1* Main.Model.ke_2*Main.Model.ke_3*Main.Model.ke_4*Main.Model.ke_5*Main.Model.ke_6*Main.Model.k_glb*Main.Model.k30*.StrengthScaleHumerus*PCSA*.ConstParam.MusStress;
};

AnyMuscleModel deltoideus_anterior_part_3 = {
  AnyVar PCSA = .fc*185.000000; // mm^2 VU study
  F0 = Main.Model.ke_1* Main.Model.ke_2*Main.Model.ke_3*Main.Model.ke_4*Main.Model.ke_5*Main.Model.ke_6*Main.Model.k_glb*Main.Model.k31*.StrengthScaleHumerus*PCSA*.ConstParam.MusStress;
};

AnyMuscleModel deltoideus_anterior_part_4 = {
  AnyVar PCSA = .fc*185.000000; // mm^2 VU study
  F0 = Main.Model.ke_1* Main.Model.ke_2*Main.Model.ke_3*Main.Model.ke_4*Main.Model.ke_5*Main.Model.ke_6*Main.Model.k_glb*Main.Model.k32*.StrengthScaleHumerus*PCSA*.ConstParam.MusStress;
};
#endif

AnyVar f3=1.0;
AnyMuscleModel infraspinatus_1 = {
  AnyVar PCSA = .f3*136.200000; // mm^2 VU study
  F0 = Main.Model.ke_1* Main.Model.ke_2*Main.Model.ke_3*Main.Model.ke_4*Main.Model.ke_5*Main.Model.ke_6*Main.Model.k_glb*Main.Model.k33*.StrengthScaleHumerus*PCSA*.ConstParam.MusStress;
};

AnyMuscleModel infraspinatus_2 = {
  AnyVar PCSA = .f3*136.200000; // mm^2 VU study
  F0 = Main.Model.ke_1* Main.Model.ke_2*Main.Model.ke_3*Main.Model.ke_4*Main.Model.ke_5*Main.Model.ke_6*Main.Model.k_glb*Main.Model.k34*.StrengthScaleHumerus*PCSA*.ConstParam.MusStress;
};

AnyMuscleModel infraspinatus_3 = {
  AnyVar PCSA = .f3*136.200000; // mm^2 VU study
  F0 = Main.Model.ke_1* Main.Model.ke_2*Main.Model.ke_3*Main.Model.ke_4*Main.Model.ke_5*Main.Model.ke_6*Main.Model.k_glb*Main.Model.k35*.StrengthScaleHumerus*PCSA*.ConstParam.MusStress;
};

AnyMuscleModel infraspinatus_4 = {
  AnyVar PCSA = .f3*136.200000; // mm^2 VU study
  F0 = Main.Model.ke_1* Main.Model.ke_2*Main.Model.ke_3*Main.Model.ke_4*Main.Model.ke_5*Main.Model.ke_6*Main.Model.k_glb*Main.Model.k36*.StrengthScaleHumerus*PCSA*.ConstParam.MusStress;
};

AnyMuscleModel infraspinatus_5 = {
  AnyVar PCSA = .f3*136.200000; // mm^2 VU study
  F0 = Main.Model.ke_1* Main.Model.ke_2*Main.Model.ke_3*Main.Model.ke_4*Main.Model.ke_5*Main.Model.ke_6*Main.Model.k_glb*Main.Model.k37*.StrengthScaleHumerus*PCSA*.ConstParam.MusStress;
};

AnyMuscleModel infraspinatus_6 = {
  AnyVar PCSA = .f3*136.200000; // mm^2 VU study
  F0 = Main.Model.ke_1* Main.Model.ke_2*Main.Model.ke_3*Main.Model.ke_4*Main.Model.ke_5*Main.Model.ke_6*Main.Model.k_glb*Main.Model.k38*.StrengthScaleHumerus*PCSA*.ConstParam.MusStress;
};

AnyMuscleModel latissimus_dorsi_1 = {
  AnyVar PCSA = 170.400000; // mm^2 VU study
  F0 = Main.Model.ke_1* Main.Model.ke_2*Main.Model.ke_3*Main.Model.ke_4*Main.Model.ke_5*Main.Model.ke_6*Main.Model.k_glb*Main.Model.k39*.StrengthScaleHumerus*PCSA*.ConstParam.MusStress;
};

AnyMuscleModel latissimus_dorsi_2 = {
  AnyVar PCSA = 170.400000; // mm^2 VU study
  F0 = Main.Model.ke_1* Main.Model.ke_2*Main.Model.ke_3*Main.Model.ke_4*Main.Model.ke_5*Main.Model.ke_6*Main.Model.k_glb*Main.Model.k40*.StrengthScaleHumerus*PCSA*.ConstParam.MusStress;
};

AnyMuscleModel latissimus_dorsi_3 = {
  AnyVar PCSA = 170.400000; // mm^2 VU study
  F0 = Main.Model.ke_1* Main.Model.ke_2*Main.Model.ke_3*Main.Model.ke_4*Main.Model.ke_5*Main.Model.ke_6*Main.Model.k_glb*Main.Model.k41*.StrengthScaleHumerus*PCSA*.ConstParam.MusStress;
};

AnyMuscleModel latissimus_dorsi_4 = {
  AnyVar PCSA = 170.400000; // mm^2 VU study
  F0 = Main.Model.ke_1* Main.Model.ke_2*Main.Model.ke_3*Main.Model.ke_4*Main.Model.ke_5*Main.Model.ke_6*Main.Model.k_glb*Main.Model.k42*.StrengthScaleHumerus*PCSA*.ConstParam.MusStress;
};

AnyMuscleModel latissimus_dorsi_5 = {
  AnyVar PCSA = 170.400000; // mm^2 VU study
  F0 = Main.Model.ke_1* Main.Model.ke_2*Main.Model.ke_3*Main.Model.ke_4*Main.Model.ke_5*Main.Model.ke_6*Main.Model.k_glb*Main.Model.k43*.StrengthScaleHumerus*PCSA*.ConstParam.MusStress;
};

AnyMuscleModel levator_scapulae_1 = {
  AnyVar PCSA = 114.700000*3/4; // mm^2 VU study
  F0 = Main.Model.ke_1* Main.Model.ke_2*Main.Model.ke_3*Main.Model.ke_4*Main.Model.ke_5*Main.Model.ke_6*Main.Model.k_glb*Main.Model.k44*.StrengthScaleHumerus*PCSA*.ConstParam.MusStress;
};

AnyMuscleModel levator_scapulae_2 = {
  AnyVar PCSA = 114.700000*3/4; // mm^2 VU study
  F0 = Main.Model.ke_1* Main.Model.ke_2*Main.Model.ke_3*Main.Model.ke_4*Main.Model.ke_5*Main.Model.ke_6*Main.Model.k_glb*Main.Model.k45*.StrengthScaleHumerus*PCSA*.ConstParam.MusStress;
};

AnyMuscleModel levator_scapulae_3 = {
  AnyVar PCSA = 114.700000*3/4; // mm^2 VU study
  F0 = Main.Model.ke_1* Main.Model.ke_2*Main.Model.ke_3*Main.Model.ke_4*Main.Model.ke_5*Main.Model.ke_6*Main.Model.k_glb*Main.Model.k46*.StrengthScaleHumerus*PCSA*.ConstParam.MusStress;
};

AnyMuscleModel levator_scapulae_4 = {
  AnyVar PCSA = 114.700000*3/4; // mm^2 VU study
  F0 = Main.Model.ke_1* Main.Model.ke_2*Main.Model.ke_3*Main.Model.ke_4*Main.Model.ke_5*Main.Model.ke_6*Main.Model.k_glb*Main.Model.k47*.StrengthScaleHumerus*PCSA*.ConstParam.MusStress;
};

AnyMuscleModel pectoralis_major_thoracic_part_1 = {
  AnyVar PCSA = 122.300000; // mm^2 VU study
  F0 = Main.Model.ke_1* Main.Model.ke_2*Main.Model.ke_3*Main.Model.ke_4*Main.Model.ke_5*Main.Model.ke_6*Main.Model.k_glb*Main.Model.k48*.StrengthScaleHumerus*PCSA*.ConstParam.MusStress;
};

AnyMuscleModel pectoralis_major_thoracic_part_2 = {
  AnyVar PCSA = 122.300000; // mm^2 VU study
  F0 = Main.Model.ke_1* Main.Model.ke_2*Main.Model.ke_3*Main.Model.ke_4*Main.Model.ke_5*Main.Model.ke_6*Main.Model.k_glb*Main.Model.k49*.StrengthScaleHumerus*PCSA*.ConstParam.MusStress;
};

AnyMuscleModel pectoralis_major_thoracic_part_3 = {
  AnyVar PCSA = 122.300000; // mm^2 VU study
  F0 =Main.Model.ke_1* Main.Model.ke_2*Main.Model.ke_3*Main.Model.ke_4*Main.Model.ke_5*Main.Model.ke_6*Main.Model.k_glb*Main.Model.k50*.StrengthScaleHumerus*PCSA*.ConstParam.MusStress;
};

AnyMuscleModel pectoralis_major_thoracic_part_4 = {
  AnyVar PCSA = 122.300000; // mm^2 VU study
  F0 = Main.Model.ke_1* Main.Model.ke_2*Main.Model.ke_3*Main.Model.ke_4*Main.Model.ke_5*Main.Model.ke_6*Main.Model.k_glb*Main.Model.k51*.StrengthScaleHumerus*PCSA*.ConstParam.MusStress;
};

AnyMuscleModel pectoralis_major_thoracic_part_5 = {
  AnyVar PCSA = 122.300000; // mm^2 VU study
  F0 = Main.Model.ke_1* Main.Model.ke_2*Main.Model.ke_3*Main.Model.ke_4*Main.Model.ke_5*Main.Model.ke_6*Main.Model.k_glb*Main.Model.k52*.StrengthScaleHumerus*PCSA*.ConstParam.MusStress;
};

AnyMuscleModel pectoralis_major_clavicular_part_1 = {
  AnyVar PCSA = 122.300000; // mm^2 VU study
  F0 = Main.Model.ke_1* Main.Model.ke_2*Main.Model.ke_3*Main.Model.ke_4*Main.Model.ke_5*Main.Model.ke_6*Main.Model.k_glb*Main.Model.k53*.StrengthScaleHumerus*PCSA*.ConstParam.MusStress;
};

AnyMuscleModel pectoralis_major_clavicular_part_2 = {
  AnyVar PCSA = 122.300000; // mm^2 VU study
  F0 = Main.Model.ke_1* Main.Model.ke_2*Main.Model.ke_3*Main.Model.ke_4*Main.Model.ke_5*Main.Model.ke_6*Main.Model.k_glb*Main.Model.k54*.StrengthScaleHumerus*PCSA*.ConstParam.MusStress;
};

AnyMuscleModel pectoralis_major_clavicular_part_3 = {
  AnyVar PCSA = 122.300000; // mm^2 VU study
  F0 = Main.Model.ke_1* Main.Model.ke_2*Main.Model.ke_3*Main.Model.ke_4*Main.Model.ke_5*Main.Model.ke_6*Main.Model.k_glb*Main.Model.k55*.StrengthScaleHumerus*PCSA*.ConstParam.MusStress;
};

AnyMuscleModel pectoralis_major_clavicular_part_4 = {
  AnyVar PCSA = 122.300000; // mm^2 VU study
  F0 = Main.Model.ke_1* Main.Model.ke_2*Main.Model.ke_3*Main.Model.ke_4*Main.Model.ke_5*Main.Model.ke_6*Main.Model.k_glb*Main.Model.k56*.StrengthScaleHumerus*PCSA*.ConstParam.MusStress;
};

AnyMuscleModel pectoralis_major_clavicular_part_5 = {
  AnyVar PCSA = 122.300000; // mm^2 VU study
  F0 = Main.Model.ke_1* Main.Model.ke_2*Main.Model.ke_3*Main.Model.ke_4*Main.Model.ke_5*Main.Model.ke_6*Main.Model.k_glb*Main.Model.k57*.StrengthScaleHumerus*PCSA*.ConstParam.MusStress;
};

AnyMuscleModel pectoralis_minor_1 = {
  AnyVar PCSA = 85.700000; // mm^2 VU study
  F0 = Main.Model.ke_1* Main.Model.ke_2*Main.Model.ke_3*Main.Model.ke_4*Main.Model.ke_5*Main.Model.ke_6*Main.Model.k_glb*Main.Model.k58*.StrengthScaleHumerus*PCSA*.ConstParam.MusStress;
};

AnyMuscleModel pectoralis_minor_2 = {
  AnyVar PCSA = 85.700000; // mm^2 VU study
  F0 = Main.Model.ke_1* Main.Model.ke_2*Main.Model.ke_3*Main.Model.ke_4*Main.Model.ke_5*Main.Model.ke_6*Main.Model.k_glb*Main.Model.k59*.StrengthScaleHumerus*PCSA*.ConstParam.MusStress;
};

AnyMuscleModel pectoralis_minor_3 = {
  AnyVar PCSA = 85.700000; // mm^2 VU study
  F0 = Main.Model.ke_1* Main.Model.ke_2*Main.Model.ke_3*Main.Model.ke_4*Main.Model.ke_5*Main.Model.ke_6*Main.Model.k_glb*Main.Model.k60*.StrengthScaleHumerus*PCSA*.ConstParam.MusStress;
};

AnyMuscleModel pectoralis_minor_4 = {
  AnyVar PCSA = 85.700000; // mm^2 VU study
  F0 = Main.Model.ke_1* Main.Model.ke_2*Main.Model.ke_3*Main.Model.ke_4*Main.Model.ke_5*Main.Model.ke_6*Main.Model.k_glb*Main.Model.k61*.StrengthScaleHumerus*PCSA*.ConstParam.MusStress;
};

AnyMuscleModel rhomboideus_1 = {
  AnyVar PCSA = 252.300000; // mm^2 VU study
  F0 = Main.Model.ke_1* Main.Model.ke_2*Main.Model.ke_3*Main.Model.ke_4*Main.Model.ke_5*Main.Model.ke_6*Main.Model.k_glb*Main.Model.k62*.StrengthScaleHumerus*PCSA*.ConstParam.MusStress;
};

AnyMuscleModel rhomboideus_2 = {
  AnyVar PCSA = 252.300000; // mm^2 VU study
  F0 = Main.Model.ke_1* Main.Model.ke_2*Main.Model.ke_3*Main.Model.ke_4*Main.Model.ke_5*Main.Model.ke_6*Main.Model.k_glb*Main.Model.k63*.StrengthScaleHumerus*PCSA*.ConstParam.MusStress;
};

AnyMuscleModel rhomboideus_3 = {
  AnyVar PCSA = 252.300000; // mm^2 VU study
  F0 = Main.Model.ke_1* Main.Model.ke_2*Main.Model.ke_3*Main.Model.ke_4*Main.Model.ke_5*Main.Model.ke_6*Main.Model.k_glb*Main.Model.k64*.StrengthScaleHumerus*PCSA*.ConstParam.MusStress;
};

AnyMuscleModel serratus_anterior_1 = {
  AnyVar PCSA = 190.500000; // mm^2 VU study
  F0 = Main.Model.ke_1* Main.Model.ke_2*Main.Model.ke_3*Main.Model.ke_4*Main.Model.ke_5*Main.Model.ke_6*Main.Model.k_glb*Main.Model.k65*.StrengthScaleHumerus*PCSA*.ConstParam.MusStress;
};

AnyMuscleModel serratus_anterior_2 = {
  AnyVar PCSA = 190.500000; // mm^2 VU study
  F0 = Main.Model.ke_1* Main.Model.ke_2*Main.Model.ke_3*Main.Model.ke_4*Main.Model.ke_5*Main.Model.ke_6*Main.Model.k_glb*Main.Model.k66*.StrengthScaleHumerus*PCSA*.ConstParam.MusStress;
};

AnyMuscleModel serratus_anterior_3 = {
  AnyVar PCSA = 190.500000; // mm^2 VU study
  F0 = Main.Model.ke_1* Main.Model.ke_2*Main.Model.ke_3*Main.Model.ke_4*Main.Model.ke_5*Main.Model.ke_6*Main.Model.k_glb*Main.Model.k67*.StrengthScaleHumerus*PCSA*.ConstParam.MusStress;
};

AnyMuscleModel serratus_anterior_4 = {
  AnyVar PCSA = 190.500000; // mm^2 VU study
  F0 = Main.Model.ke_1* Main.Model.ke_2*Main.Model.ke_3*Main.Model.ke_4*Main.Model.ke_5*Main.Model.ke_6*Main.Model.k_glb*Main.Model.k68*.StrengthScaleHumerus*PCSA*.ConstParam.MusStress;
};

AnyMuscleModel serratus_anterior_5 = {
  AnyVar PCSA = 190.500000; // mm^2 VU study
  F0 = Main.Model.ke_1* Main.Model.ke_2*Main.Model.ke_3*Main.Model.ke_4*Main.Model.ke_5*Main.Model.ke_6*Main.Model.k_glb*Main.Model.k69*.StrengthScaleHumerus*PCSA*.ConstParam.MusStress;
};

AnyMuscleModel serratus_anterior_6 = {
  AnyVar PCSA = 190.500000; // mm^2 VU study
  F0 = Main.Model.ke_1* Main.Model.ke_2*Main.Model.ke_3*Main.Model.ke_4*Main.Model.ke_5*Main.Model.ke_6*Main.Model.k_glb*Main.Model.k70*.StrengthScaleHumerus*PCSA*.ConstParam.MusStress;
};

//Moved from neck model
AnyMuscleModel SternocleidomastoidPar = {
  AnyVar PCSA = 4.92/2 * 100; //Physiological Cross Sectional Area in mm2
  F0 = Main.Model.ke_1* Main.Model.ke_2*Main.Model.ke_3*Main.Model.ke_4*Main.Model.ke_5*Main.Model.ke_6*Main.Model.k_glb*Main.Model.k71*.StrengthScaleHumerus*PCSA*.ConstParam.MusStress;
};

AnyVar f2=1.0;
AnyMuscleModel subscapularis_1 = {
  AnyVar PCSA = .f2*250.000000; // mm^2 VU study
  F0 = Main.Model.ke_1* Main.Model.ke_2*Main.Model.ke_3*Main.Model.ke_4*Main.Model.ke_5*Main.Model.ke_6*Main.Model.k_glb*Main.Model.k72*.StrengthScaleHumerus*PCSA*.ConstParam.MusStress;
};

AnyMuscleModel subscapularis_2 = {
  AnyVar PCSA = .f2*250.000000; // mm^2 VU study
  F0 = Main.Model.ke_1* Main.Model.ke_2*Main.Model.ke_3*Main.Model.ke_4*Main.Model.ke_5*Main.Model.ke_6*Main.Model.k_glb*Main.Model.k73*.StrengthScaleHumerus*PCSA*.ConstParam.MusStress;
};

AnyMuscleModel subscapularis_3 = {
  AnyVar PCSA = .f2*250.000000; // mm^2 VU study
  F0 = Main.Model.ke_1* Main.Model.ke_2*Main.Model.ke_3*Main.Model.ke_4*Main.Model.ke_5*Main.Model.ke_6*Main.Model.k_glb*Main.Model.k74*.StrengthScaleHumerus*PCSA*.ConstParam.MusStress;
};

AnyMuscleModel subscapularis_4 = {
  AnyVar PCSA = .f2*250.000000; // mm^2 VU study
  F0 = Main.Model.ke_1* Main.Model.ke_2*Main.Model.ke_3*Main.Model.ke_4*Main.Model.ke_5*Main.Model.ke_6*Main.Model.k_glb*Main.Model.k75*.StrengthScaleHumerus*PCSA*.ConstParam.MusStress;
};

AnyMuscleModel subscapularis_5 = {
  AnyVar PCSA = .f2*250.000000; // mm^2 VU study
  F0 = Main.Model.ke_1* Main.Model.ke_2*Main.Model.ke_3*Main.Model.ke_4*Main.Model.ke_5*Main.Model.ke_6*Main.Model.k_glb*Main.Model.k76*.StrengthScaleHumerus*PCSA*.ConstParam.MusStress;
};

AnyMuscleModel subscapularis_6 = {
  AnyVar PCSA = .f2*250.000000; // mm^2 VU study
  F0 = Main.Model.ke_1* Main.Model.ke_2*Main.Model.ke_3*Main.Model.ke_4*Main.Model.ke_5*Main.Model.ke_6*Main.Model.k_glb*Main.Model.k77*.StrengthScaleHumerus*PCSA*.ConstParam.MusStress;
};

AnyMuscleModel supraspinatus_1 = {
  AnyVar PCSA = .f*78.000000; // mm^2 VU study
  F0 = Main.Model.ke_1* Main.Model.ke_2*Main.Model.ke_3*Main.Model.ke_4*Main.Model.ke_5*Main.Model.ke_6*Main.Model.k_glb*Main.Model.k78*.StrengthScaleHumerus*PCSA*.ConstParam.MusStress;
};

AnyMuscleModel supraspinatus_2 = {
  AnyVar PCSA = .f*78.000000; // mm^2 VU study
  F0 = Main.Model.ke_1* Main.Model.ke_2*Main.Model.ke_3*Main.Model.ke_4*Main.Model.ke_5*Main.Model.ke_6*Main.Model.k_glb*Main.Model.k79*.StrengthScaleHumerus*PCSA*.ConstParam.MusStress;
};

AnyMuscleModel supraspinatus_3 = {
  AnyVar PCSA = .f*78.000000; // mm^2 VU study
  F0 = Main.Model.ke_1* Main.Model.ke_2*Main.Model.ke_3*Main.Model.ke_4*Main.Model.ke_5*Main.Model.ke_6*Main.Model.k_glb*Main.Model.k80*.StrengthScaleHumerus*PCSA*.ConstParam.MusStress;
};

AnyMuscleModel supraspinatus_4 = {
  AnyVar PCSA = .f*78.000000; // mm^2 VU study
  F0 = Main.Model.ke_1* Main.Model.ke_2*Main.Model.ke_3*Main.Model.ke_4*Main.Model.ke_5*Main.Model.ke_6*Main.Model.k_glb*Main.Model.k81*.StrengthScaleHumerus*PCSA*.ConstParam.MusStress;
};

AnyMuscleModel supraspinatus_5 = {
  AnyVar PCSA = .f*78.000000; // mm^2 VU study
  F0 = Main.Model.ke_1* Main.Model.ke_2*Main.Model.ke_3*Main.Model.ke_4*Main.Model.ke_5*Main.Model.ke_6*Main.Model.k_glb*Main.Model.k82*.StrengthScaleHumerus*PCSA*.ConstParam.MusStress;
};

AnyMuscleModel supraspinatus_6 = {
  AnyVar PCSA = .f*78.000000; // mm^2 VU study
  F0 = Main.Model.ke_1* Main.Model.ke_2*Main.Model.ke_3*Main.Model.ke_4*Main.Model.ke_5*Main.Model.ke_6*Main.Model.k_glb*Main.Model.k83*.StrengthScaleHumerus*PCSA*.ConstParam.MusStress;
};

AnyMuscleModel teres_major_1 = {
  AnyVar PCSA = 183.600000; // mm^2 VU study
  F0 = Main.Model.ke_1* Main.Model.ke_2*Main.Model.ke_3*Main.Model.ke_4*Main.Model.ke_5*Main.Model.ke_6*Main.Model.k_glb*Main.Model.k84*.StrengthScaleHumerus*PCSA*.ConstParam.MusStress;
};

AnyMuscleModel teres_major_2 = {
  AnyVar PCSA = 183.600000; // mm^2 VU study
  F0 = Main.Model.ke_1* Main.Model.ke_2*Main.Model.ke_3*Main.Model.ke_4*Main.Model.ke_5*Main.Model.ke_6*Main.Model.k_glb*Main.Model.k85*.StrengthScaleHumerus*PCSA*.ConstParam.MusStress;
};

AnyMuscleModel teres_major_3 = {
  AnyVar PCSA = 183.600000; // mm^2 VU study
  F0 = Main.Model.ke_1* Main.Model.ke_2*Main.Model.ke_3*Main.Model.ke_4*Main.Model.ke_5*Main.Model.ke_6*Main.Model.k_glb*Main.Model.k86*.StrengthScaleHumerus*PCSA*.ConstParam.MusStress;
};

AnyMuscleModel teres_major_4 = {
  AnyVar PCSA = 183.600000; // mm^2 VU study
  F0 = Main.Model.ke_1* Main.Model.ke_2*Main.Model.ke_3*Main.Model.ke_4*Main.Model.ke_5*Main.Model.ke_6*Main.Model.k_glb*Main.Model.k87*.StrengthScaleHumerus*PCSA*.ConstParam.MusStress;
};

AnyMuscleModel teres_major_5 = {
  AnyVar PCSA = 183.600000; // mm^2 VU study
  F0 = Main.Model.ke_1* Main.Model.ke_2*Main.Model.ke_3*Main.Model.ke_4*Main.Model.ke_5*Main.Model.ke_6*Main.Model.k_glb*Main.Model.k88*.StrengthScaleHumerus*PCSA*.ConstParam.MusStress;
};

AnyMuscleModel teres_major_6 = {
  AnyVar PCSA = 183.600000; // mm^2 VU study
  F0 = Main.Model.ke_1* Main.Model.ke_2*Main.Model.ke_3*Main.Model.ke_4*Main.Model.ke_5*Main.Model.ke_6*Main.Model.k_glb*Main.Model.k89*.StrengthScaleHumerus*PCSA*.ConstParam.MusStress;
};

AnyMuscleModel teres_minor_1 = {
  AnyVar PCSA = 51.600000; // mm^2 VU study
  F0 = Main.Model.ke_1* Main.Model.ke_2*Main.Model.ke_3*Main.Model.ke_4*Main.Model.ke_5*Main.Model.ke_6*Main.Model.k_glb*Main.Model.k90*.StrengthScaleHumerus*PCSA*.ConstParam.MusStress;
};

AnyMuscleModel teres_minor_2 = {
  AnyVar PCSA = 51.600000; // mm^2 VU study
  F0 = Main.Model.ke_1* Main.Model.ke_2*Main.Model.ke_3*Main.Model.ke_4*Main.Model.ke_5*Main.Model.ke_6*Main.Model.k_glb*Main.Model.k91*.StrengthScaleHumerus*PCSA*.ConstParam.MusStress;
};

AnyMuscleModel teres_minor_3 = {
  AnyVar PCSA = 51.600000; // mm^2 VU study
  F0 = Main.Model.ke_1* Main.Model.ke_2*Main.Model.ke_3*Main.Model.ke_4*Main.Model.ke_5*Main.Model.ke_6*Main.Model.k_glb*Main.Model.k92*.StrengthScaleHumerus*PCSA*.ConstParam.MusStress;
};

AnyMuscleModel teres_minor_4 = {
  AnyVar PCSA = 51.600000; // mm^2 VU study
  F0 = Main.Model.ke_1* Main.Model.ke_2*Main.Model.ke_3*Main.Model.ke_4*Main.Model.ke_5*Main.Model.ke_6*Main.Model.k_glb*Main.Model.k93*.StrengthScaleHumerus*PCSA*.ConstParam.MusStress;
};

AnyMuscleModel teres_minor_5 = {
  AnyVar PCSA = 51.600000; // mm^2 VU study
  F0 = Main.Model.ke_1* Main.Model.ke_2*Main.Model.ke_3*Main.Model.ke_4*Main.Model.ke_5*Main.Model.ke_6*Main.Model.k_glb*Main.Model.k94*.StrengthScaleHumerus*PCSA*.ConstParam.MusStress;
};

AnyMuscleModel teres_minor_6 = {
  AnyVar PCSA = 51.600000; // mm^2 VU study
  F0 = Main.Model.ke_1* Main.Model.ke_2*Main.Model.ke_3*Main.Model.ke_4*Main.Model.ke_5*Main.Model.ke_6*Main.Model.k_glb*Main.Model.k95*.StrengthScaleHumerus*PCSA*.ConstParam.MusStress;
};

AnyMuscleModel trapezius_scapular_part_1 = {
  AnyVar PCSA = 145.500000; // mm^2 VU study
  F0 = Main.Model.ke_1* Main.Model.ke_2*Main.Model.ke_3*Main.Model.ke_4*Main.Model.ke_5*Main.Model.ke_6*Main.Model.k_glb*Main.Model.k96*.StrengthScaleHumerus*PCSA*.ConstParam.MusStress;
};

AnyMuscleModel trapezius_scapular_part_2 = {
  AnyVar PCSA = 145.500000; // mm^2 VU study
  F0 = Main.Model.ke_1* Main.Model.ke_2*Main.Model.ke_3*Main.Model.ke_4*Main.Model.ke_5*Main.Model.ke_6*Main.Model.k_glb*Main.Model.k97*.StrengthScaleHumerus*PCSA*.ConstParam.MusStress;
};

AnyMuscleModel trapezius_scapular_part_3 = {
  AnyVar PCSA = 145.500000; // mm^2 VU study
  F0 = Main.Model.ke_1* Main.Model.ke_2*Main.Model.ke_3*Main.Model.ke_4*Main.Model.ke_5*Main.Model.ke_6*Main.Model.k_glb*Main.Model.k98*.StrengthScaleHumerus*PCSA*.ConstParam.MusStress;
};

AnyMuscleModel trapezius_scapular_part_4 = {
  AnyVar PCSA = 145.500000; // mm^2 VU study
  F0 = Main.Model.ke_1* Main.Model.ke_2*Main.Model.ke_3*Main.Model.ke_4*Main.Model.ke_5*Main.Model.ke_6*Main.Model.k_glb*Main.Model.k99*.StrengthScaleHumerus*PCSA*.ConstParam.MusStress;
};

AnyMuscleModel trapezius_scapular_part_5 = {
  AnyVar PCSA = 145.500000; // mm^2 VU study
  F0 = Main.Model.ke_1* Main.Model.ke_2*Main.Model.ke_3*Main.Model.ke_4*Main.Model.ke_5*Main.Model.ke_6*Main.Model.k_glb*Main.Model.k100*.StrengthScaleHumerus*PCSA*.ConstParam.MusStress;
};

AnyMuscleModel trapezius_scapular_part_6 = {
  AnyVar PCSA = 145.500000; // mm^2 VU study
  F0 = Main.Model.ke_1* Main.Model.ke_2*Main.Model.ke_3*Main.Model.ke_4*Main.Model.ke_5*Main.Model.ke_6*Main.Model.k_glb*Main.Model.k101*.StrengthScaleHumerus*PCSA*.ConstParam.MusStress;
};

AnyMuscleModel trapezius_clavicular_part_1 = {
  AnyVar PCSA = 145.500000; // mm^2 VU study
  F0 = Main.Model.ke_1* Main.Model.ke_2*Main.Model.ke_3*Main.Model.ke_4*Main.Model.ke_5*Main.Model.ke_6*Main.Model.k_glb*Main.Model.k102*.StrengthScaleHumerus*PCSA*.ConstParam.MusStress;
};

AnyMuscleModel trapezius_clavicular_part_2 = {
  AnyVar PCSA = 145.500000; // mm^2 VU study
  F0 = Main.Model.ke_1* Main.Model.ke_2*Main.Model.ke_3*Main.Model.ke_4*Main.Model.ke_5*Main.Model.ke_6*Main.Model.k_glb*Main.Model.k103*.StrengthScaleHumerus*PCSA*.ConstParam.MusStress;
};

AnyMuscleModel trapezius_clavicular_part_3 = {
  AnyVar PCSA = 145.500000; // mm^2 VU study
  F0 = Main.Model.ke_1* Main.Model.ke_2*Main.Model.ke_3*Main.Model.ke_4*Main.Model.ke_5*Main.Model.ke_6*Main.Model.k_glb*Main.Model.k104*.StrengthScaleHumerus*PCSA*.ConstParam.MusStress;
};

AnyMuscleModel trapezius_clavicular_part_4 = {
  AnyVar PCSA = 145.500000; // mm^2 VU study
  F0 = Main.Model.ke_1* Main.Model.ke_2*Main.Model.ke_3*Main.Model.ke_4*Main.Model.ke_5*Main.Model.ke_6*Main.Model.k_glb*Main.Model.k105*.StrengthScaleHumerus*PCSA*.ConstParam.MusStress;
};

AnyMuscleModel trapezius_clavicular_part_5 = {
  AnyVar PCSA = 145.500000; // mm^2 VU study
  F0 = Main.Model.ke_1* Main.Model.ke_2*Main.Model.ke_3*Main.Model.ke_4*Main.Model.ke_5*Main.Model.ke_6*Main.Model.k_glb*Main.Model.k106*.StrengthScaleHumerus*PCSA*.ConstParam.MusStress;
};

AnyMuscleModel trapezius_clavicular_part_6 = {
  AnyVar PCSA = 145.500000; // mm^2 VU study
  F0 = Main.Model.ke_1* Main.Model.ke_2*Main.Model.ke_3*Main.Model.ke_4*Main.Model.ke_5*Main.Model.ke_6*Main.Model.k_glb*Main.Model.k107*.StrengthScaleHumerus*PCSA*.ConstParam.MusStress;
};

// ************************************
//Simple muscle models for the muscles in the forearm
// ***********************************'*

AnyVar StrengthScaleHumerus = .StrengthScaling.Humerus.StrengthScale;
AnyVar StrengthScaleUlna = .StrengthScaling.Ulna.StrengthScale;

AnyMuscleModel Triceps_LH_1 = {
  AnyVar Volume = 0.5*146.00000/10^6; // m^3 mayo k2_2
  AnyVar MuscleBellyLength = 0.300; // m mayo k2_2
  AnyVar Gamma0Temp = (pi/180)* 30; // mayo study speciem #4 Veeger1997
  AnyVar PCSA = Volume/(MuscleBellyLength*cos(Gamma0Temp));
  F0 = Main.Model.ke_1* Main.Model.ke_2*Main.Model.ke_3*Main.Model.ke_4*Main.Model.ke_5*Main.Model.ke_6*Main.Model.k_glb*Main.Model.k108*.StrengthScaleHumerus*PCSA*.ConstParam.MusStressForearm;
};

AnyMuscleModel Triceps_LH_2 = {
  AnyVar Gamma0Temp = (pi/180)* 30; // mayo study speciem #4 Veeger1997
  AnyVar Volume = 0.5*146.00000/10^6; // m^3 mayo k2_2
  AnyVar MuscleBellyLength = 0.300; // m mayo k2_2
  AnyVar PCSA = Volume/(MuscleBellyLength*cos(Gamma0Temp));
  F0 = Main.Model.ke_1* Main.Model.ke_2*Main.Model.ke_3*Main.Model.ke_4*Main.Model.ke_5*Main.Model.ke_6*Main.Model.k_glb*Main.Model.k109*.StrengthScaleHumerus*PCSA*.ConstParam.MusStressForearm;
};

AnyMuscleModel Brachialis_1 = {
  AnyVar Gamma0Temp = (pi/180)*15; // mayo study speciem #4 Veeger1997
  AnyVar Volume = 0.5*102.00000/10^6; // m^3 mayo k2_2
  AnyVar MuscleBellyLength = 0.173; // m mayo k2_2
  AnyVar PCSA = Volume/(MuscleBellyLength*cos(Gamma0Temp));
  F0 = Main.Model.ke_1* Main.Model.ke_2*Main.Model.ke_3*Main.Model.ke_4*Main.Model.ke_5*Main.Model.ke_6*Main.Model.k_glb*Main.Model.k110*.StrengthScaleHumerus*PCSA*.ConstParam.MusStressForearm;
};

AnyMuscleModel Brachialis_2 = {
  AnyVar Gamma0Temp =(pi/180)*15; // mayo study speciem #4 Veeger1997
  AnyVar Volume = 0.5*102.00000/10^6; // m^3 mayo k2_2
  AnyVar MuscleBellyLength = 0.173; // m mayo k2_2
  AnyVar PCSA = Volume/(MuscleBellyLength*cos(Gamma0Temp));
  F0 = Main.Model.ke_1* Main.Model.ke_2*Main.Model.ke_3*Main.Model.ke_4*Main.Model.ke_5*Main.Model.ke_6*Main.Model.k_glb*Main.Model.k111*.StrengthScaleHumerus*PCSA*.ConstParam.MusStressForearm;
};

AnyMuscleModel Triceps_ME_1 = {
  AnyVar Gamma0Temp = (pi/180)*45; // mayo study speciem #4 Veeger1997

  AnyVar Volume = 0.5*160.00000/10^6; // m^3 mayo k2_2
  AnyVar MuscleBellyLength = 0.250; // m mayo k2_2
  AnyVar PCSA = Volume/(MuscleBellyLength*cos(Gamma0Temp));
  F0 = Main.Model.ke_1* Main.Model.ke_2*Main.Model.ke_3*Main.Model.ke_4*Main.Model.ke_5*Main.Model.ke_6*Main.Model.k_glb*Main.Model.k112*.StrengthScaleHumerus*PCSA*.ConstParam.MusStressForearm;
};

AnyMuscleModel Triceps_ME_2 = {
  AnyVar Gamma0Temp = (pi/180)*45; // mayo study speciem #4 Veeger1997

  AnyVar Volume = 0.5*160.00000/10^6; // m^3 mayo k2_2
  AnyVar MuscleBellyLength = 0.250; // m mayo k2_2
  AnyVar PCSA = Volume/(MuscleBellyLength*cos(Gamma0Temp));
  F0 = Main.Model.ke_1* Main.Model.ke_2*Main.Model.ke_3*Main.Model.ke_4*Main.Model.ke_5*Main.Model.ke_6*Main.Model.k_glb*Main.Model.k113*.StrengthScaleHumerus*PCSA*.ConstParam.MusStressForearm;
};

AnyMuscleModel Triceps_LA_1 = {
  AnyVar Gamma0Temp = (pi/180)*30; // mayo study speciem #4 Veeger1997
  AnyVar Volume = 0.5*108.00000/10^6; // m^3 mayo k2_2
  AnyVar MuscleBellyLength = 0.260; // m mayo k2_2
  AnyVar PCSA = Volume/(MuscleBellyLength*cos(Gamma0Temp));
  F0 = Main.Model.ke_1* Main.Model.ke_2*Main.Model.ke_3*Main.Model.ke_4*Main.Model.ke_5*Main.Model.ke_6*Main.Model.k_glb*Main.Model.k114*.StrengthScaleHumerus*PCSA*.ConstParam.MusStressForearm;
};

AnyMuscleModel Triceps_LA_2 = {
  AnyVar Gamma0Temp = (pi/180)*30; // mayo study speciem #4 Veeger1997
  AnyVar Volume = 0.5*108.00000/10^6; // m^3 mayo k2_2
  AnyVar MuscleBellyLength = 0.260; // m mayo k2_2
  AnyVar PCSA = Volume/(MuscleBellyLength*cos(Gamma0Temp));
  F0 = Main.Model.ke_1* Main.Model.ke_2*Main.Model.ke_3*Main.Model.ke_4*Main.Model.ke_5*Main.Model.ke_6*Main.Model.k_glb*Main.Model.k115*.StrengthScaleHumerus*PCSA*.ConstParam.MusStressForearm;
};

AnyMuscleModel Brach_rad_1 = {
  AnyVar Gamma0Temp = (pi/180)*15; // mayo study speciem #4 Veeger1997
  AnyVar Volume = 0.5*34.00000/10^6; // m^3 mayo k2_2
  AnyVar MuscleBellyLength = 0.160; // m mayo k2_2
  AnyVar PCSA = Volume/(MuscleBellyLength*cos(Gamma0Temp));
  F0 = Main.Model.ke_1* Main.Model.ke_2*Main.Model.ke_3*Main.Model.ke_4*Main.Model.ke_5*Main.Model.ke_6*Main.Model.k_glb*Main.Model.k116*.StrengthScaleUlna*PCSA*.ConstParam.MusStressForearm;
};

AnyMuscleModel Brach_rad_2 = {
  AnyVar Gamma0Temp = (pi/180)*15; // mayo study speciem #4 Veeger1997
  AnyVar Volume = 0.5*34.00000/10^6; // m^3 mayo k2_2
  AnyVar MuscleBellyLength = 0.160; // m mayo k2_2
  AnyVar PCSA = Volume/(MuscleBellyLength*cos(Gamma0Temp));
  F0 = Main.Model.ke_1* Main.Model.ke_2*Main.Model.ke_3*Main.Model.ke_4*Main.Model.ke_5*Main.Model.ke_6*Main.Model.k_glb*Main.Model.k117*.StrengthScaleUlna*PCSA*.ConstParam.MusStressForearm;
};

AnyMuscleModel Anconeus_1  = {
  AnyVar Gamma0Temp = (pi/180)*30; // mayo study speciem #4 Veeger1997
  AnyVar Volume = 0.5*8.00000/10^6; // m^3 mayo k2_2
  AnyVar MuscleBellyLength = 0.085; // m mayo k2_2 guesstimate from other subject
  AnyVar PCSA = Volume/(MuscleBellyLength*cos(Gamma0Temp));
  F0 = Main.Model.ke_1* Main.Model.ke_2*Main.Model.ke_3*Main.Model.ke_4*Main.Model.ke_5*Main.Model.ke_6*Main.Model.k_glb*Main.Model.k118*.StrengthScaleUlna*PCSA*.ConstParam.MusStressForearm;
};

AnyMuscleModel Anconeus_2  = {
  AnyVar Gamma0Temp = (pi/180)*30; // mayo study speciem #4 Veeger1997
  AnyVar Volume = 0.5*8.00000/10^6; // m^3 mayo k2_2
  AnyVar MuscleBellyLength = 0.085; // m mayo k2_2 guesstimate from other subject
  AnyVar PCSA = Volume/(MuscleBellyLength*cos(Gamma0Temp));
  F0 = Main.Model.ke_1* Main.Model.ke_2*Main.Model.ke_3*Main.Model.ke_4*Main.Model.ke_5*Main.Model.ke_6*Main.Model.k_glb*Main.Model.k119*.StrengthScaleUlna*PCSA*.ConstParam.MusStressForearm;
};

AnyMuscleModel Pronator_teres_caput_humeral_1 = {
   AnyVar Gamma0Temp = (pi/180)*15; // mayo study speciem #4 Veeger1997
AnyVar Volume = 0.5*31.5/10^6; // m^3 mayo k2_2
  AnyVar MuscleBellyLength = 0.175; // m mayo k2_2 guesstimate from other subject
  AnyVar PCSA = Volume/(MuscleBellyLength*cos(Gamma0Temp));
  F0 = Main.Model.ke_1* Main.Model.ke_2*Main.Model.ke_3*Main.Model.ke_4*Main.Model.ke_5*Main.Model.ke_6*Main.Model.k_glb*Main.Model.k120*.StrengthScaleUlna*PCSA*.ConstParam.MusStressForearm;
};

AnyMuscleModel Pronator_teres_caput_humeral_2 = {
  AnyVar Gamma0Temp = (pi/180)*15; // mayo study speciem #4 Veeger1997
  AnyVar Volume = 0.5*31.5/10^6; // m^3 mayo k2_2
  AnyVar MuscleBellyLength = 0.175; // m mayo k2_2 guesstimate from other subject
  AnyVar PCSA = Volume/(MuscleBellyLength*cos(Gamma0Temp));
  F0 = Main.Model.ke_1* Main.Model.ke_2*Main.Model.ke_3*Main.Model.ke_4*Main.Model.ke_5*Main.Model.ke_6*Main.Model.k_glb*Main.Model.k121*.StrengthScaleUlna*PCSA*.ConstParam.MusStressForearm;
};

AnyMuscleModel Pronator_teres_caput_ulnare_1  = {
  AnyVar Gamma0Temp = (pi/180)*15; // mayo study speciem #4 Veeger1997
  AnyVar Volume = 31.5/10^6; // m^3 mayo k2_2
  AnyVar MuscleBellyLength = 0.175; // m mayo k2_2 guesstimate from other subject
  AnyVar PCSA = Volume/(MuscleBellyLength*cos(Gamma0Temp));
  F0 = Main.Model.ke_1* Main.Model.ke_2*Main.Model.ke_3*Main.Model.ke_4*Main.Model.ke_5*Main.Model.ke_6*Main.Model.k_glb*Main.Model.k122*.StrengthScaleUlna*PCSA*.ConstParam.MusStressForearm;
};

AnyMuscleModel Supinator_humerus_part_1  = {
  AnyVar Gamma0Temp = (pi/180)*15; // mayo study speciem #4 Veeger1997
  AnyVar Volume = 0.5*23/10^6; // m^3 mayo k2_2
  AnyVar MuscleBellyLength = 0.040; // m mayo k2_2
  AnyVar PCSA = Volume/(MuscleBellyLength*cos(Gamma0Temp));
  F0 = Main.Model.ke_1* Main.Model.ke_2*Main.Model.ke_3*Main.Model.ke_4*Main.Model.ke_5*Main.Model.ke_6*Main.Model.k_glb*Main.Model.k123*.StrengthScaleUlna*PCSA*.ConstParam.MusStressForearm;
};

AnyMuscleModel Supinator_humerus_part_2  = {
  AnyVar Gamma0Temp = (pi/180)*15; // mayo study speciem #4 Veeger1997
  AnyVar Volume = 0.5*23/10^6; // m^3 mayo k2_2
  AnyVar MuscleBellyLength = 0.040; // m mayo k2_2
  AnyVar PCSA = Volume/(MuscleBellyLength*cos(Gamma0Temp));
  F0 = Main.Model.ke_1* Main.Model.ke_2*Main.Model.ke_3*Main.Model.ke_4*Main.Model.ke_5*Main.Model.ke_6*Main.Model.k_glb*Main.Model.k124*.StrengthScaleUlna*PCSA*.ConstParam.MusStressForearm;
};

AnyMuscleModel Supinator_ulna_part_1  = {
  AnyVar Gamma0Temp = (pi/180)*15; // mayo study speciem #4 Veeger1997
  AnyVar Volume = 0.5*23/10^6; // m^3 mayo k2_2
  AnyVar MuscleBellyLength = 0.040; // m mayo k2_2
  AnyVar PCSA = Volume/(MuscleBellyLength*cos(Gamma0Temp));
  F0 = Main.Model.ke_1* Main.Model.ke_2*Main.Model.ke_3*Main.Model.ke_4*Main.Model.ke_5*Main.Model.ke_6*Main.Model.k_glb*Main.Model.k125*.StrengthScaleUlna*PCSA*.ConstParam.MusStressForearm;
};

AnyMuscleModel Supinator_ulna_part_2  = {
  AnyVar Gamma0Temp = (pi/180)*15; // mayo study speciem #4 Veeger1997
  AnyVar Volume = 0.5*23/10^6; // m^3 mayo k2_2
  AnyVar MuscleBellyLength = 0.040; // m mayo k2_2
  AnyVar PCSA = Volume/(MuscleBellyLength*cos(Gamma0Temp));
  F0 = Main.Model.ke_1* Main.Model.ke_2*Main.Model.ke_3*Main.Model.ke_4*Main.Model.ke_5*Main.Model.ke_6*Main.Model.k_glb*Main.Model.k126*.StrengthScaleUlna*PCSA*.ConstParam.MusStressForearm;
};

AnyMuscleModel Pron_quadr_1 = {
  AnyVar Gamma0Temp = (pi/180)*15; // mayo study speciem #4 Veeger1997
  AnyVar Volume = 0.5*8.5/10^6; // m^3 mayo k2_2
  AnyVar MuscleBellyLength = 0.040; // m mayo k2_2 guesstimate from other subject
  AnyVar PCSA = Volume/(MuscleBellyLength*cos(Gamma0Temp));
  F0 = Main.Model.ke_1* Main.Model.ke_2*Main.Model.ke_3*Main.Model.ke_4*Main.Model.ke_5*Main.Model.ke_6*Main.Model.k_glb*Main.Model.k127*.StrengthScaleUlna*PCSA*.ConstParam.MusStressForearm;
};

AnyMuscleModel Pron_quadr_2 = {
  AnyVar Gamma0Temp = (pi/180)*15; // mayo study speciem #4 Veeger1997
  AnyVar Volume = 0.5*23/10^6; // m^3 mayo k2_2
  AnyVar MuscleBellyLength = 0.040; // m mayo k2_2 guesstimate from other subject
  AnyVar PCSA = Volume/(MuscleBellyLength*cos(Gamma0Temp));
  F0 = Main.Model.ke_1* Main.Model.ke_2*Main.Model.ke_3*Main.Model.ke_4*Main.Model.ke_5*Main.Model.ke_6*Main.Model.k_glb*Main.Model.k128*.StrengthScaleUlna*PCSA*.ConstParam.MusStressForearm;
};


AnyMuscleModel Extensor_Pollicis_Longus = {
  AnyVar PCSA = 90.00000; // m^2 Lieber1
  F0 = Main.Model.ke_1* Main.Model.ke_2*Main.Model.ke_3*Main.Model.ke_4*Main.Model.ke_5*Main.Model.ke_6*Main.Model.k_glb*Main.Model.k129*.StrengthScaleUlna*PCSA*.ConstParam.MusStress;
};

AnyMuscleModel  Extensor_Pollicis_Brevis = {
  AnyVar PCSA = 30.00000; // mm^2 Jacobson
  F0 = Main.Model.ke_1* Main.Model.ke_2*Main.Model.ke_3*Main.Model.ke_4*Main.Model.ke_5*Main.Model.ke_6*Main.Model.k_glb*Main.Model.k130*.StrengthScaleUlna*PCSA*.ConstParam.MusStress;
};

AnyMuscleModel Abductor_Pollicis_Longus = {
  AnyVar PCSA = 130.0000; // mm^2 Lieber1
  F0 = Main.Model.ke_1* Main.Model.ke_2*Main.Model.ke_3*Main.Model.ke_4*Main.Model.ke_5*Main.Model.ke_6*Main.Model.k_glb*Main.Model.k131*.StrengthScaleUlna*PCSA*.ConstParam.MusStress;
};


AnyMuscleModel Extensor_Indicis = {
  AnyVar PCSA = 50.00000; // mm^2 Lieber1
  F0 = Main.Model.ke_1* Main.Model.ke_2*Main.Model.ke_3*Main.Model.ke_4*Main.Model.ke_5*Main.Model.ke_6*Main.Model.k_glb*Main.Model.k132*.StrengthScaleUlna*PCSA*.ConstParam.MusStress;
};

AnyMuscleModel Extensor_Carpi_Ulnaris = {
  AnyVar PCSA = 210.00000; // mm^2 Lieber2
  F0 = Main.Model.ke_1* Main.Model.ke_2*Main.Model.ke_3*Main.Model.ke_4*Main.Model.ke_5*Main.Model.ke_6*Main.Model.k_glb*Main.Model.k133*.StrengthScaleUlna*PCSA*.ConstParam.MusStress;
};


AnyMuscleModel Extensor_Carpi_Radialis_Brevis = {
  AnyVar PCSA = 220.0000; // mm^2 Murray
  F0 = Main.Model.ke_1* Main.Model.ke_2*Main.Model.ke_3*Main.Model.ke_4*Main.Model.ke_5*Main.Model.ke_6*Main.Model.k_glb*Main.Model.k134*.StrengthScaleUlna*PCSA*.ConstParam.MusStress;
};

AnyMuscleModel Extensor_Carpi_Radialis_Longus = {
  AnyVar PCSA = 220.0000; // mm^2 Murray
  F0 = Main.Model.ke_1* Main.Model.ke_2*Main.Model.ke_3*Main.Model.ke_4*Main.Model.ke_5*Main.Model.ke_6*Main.Model.k_glb*Main.Model.k135*.StrengthScaleUlna*PCSA*.ConstParam.MusStress;
};


AnyMuscleModel Flexor_Carpi_Radialis = {
  AnyVar PCSA = 160; //mm^2 Lieber1
  F0 = Main.Model.ke_1* Main.Model.ke_2*Main.Model.ke_3*Main.Model.ke_4*Main.Model.ke_5*Main.Model.ke_6*Main.Model.k_glb*Main.Model.k136*.StrengthScaleUlna*PCSA*.ConstParam.MusStress;
};

AnyMuscleModel Flexor_Carpi_Ulnaris = {
  AnyVar PCSA = 290; //mm^2 Lieber1
  F0 = Main.Model.ke_1* Main.Model.ke_2*Main.Model.ke_3*Main.Model.ke_4*Main.Model.ke_5*Main.Model.ke_6*Main.Model.k_glb*Main.Model.k137*.StrengthScaleUlna*PCSA*.ConstParam.MusStress;
};


AnyMuscleModel Palmaris_Longus = {
  AnyVar PCSA = 60; //mm^2 Lieber2
  F0 = Main.Model.ke_1* Main.Model.ke_2*Main.Model.ke_3*Main.Model.ke_4*Main.Model.ke_5*Main.Model.ke_6*Main.Model.k_glb*Main.Model.k138*.StrengthScaleUlna*PCSA*.ConstParam.MusStress;
};


AnyMuscleModel Flexor_Digitorum_Superficialis_Digit5 = {
  AnyVar PCSA = 40; //mm^2 Lieber 2
  F0 = Main.Model.ke_1* Main.Model.ke_2*Main.Model.ke_3*Main.Model.ke_4*Main.Model.ke_5*Main.Model.ke_6*Main.Model.k_glb*Main.Model.k139*.StrengthScaleUlna*PCSA*.ConstParam.MusStress;
};

AnyMuscleModel Flexor_Digitorum_Superficialis_Digit4 = {
  AnyVar PCSA = 130; //mm^2 Lieber 2
  F0 = Main.Model.ke_1* Main.Model.ke_2*Main.Model.ke_3*Main.Model.ke_4*Main.Model.ke_5*Main.Model.ke_6*Main.Model.k_glb*Main.Model.k140*.StrengthScaleUlna*PCSA*.ConstParam.MusStress;
};


AnyMuscleModel Flexor_Digitorum_Superficialis_Digit3 = {
  AnyVar PCSA = 200; //mm^2 Lieber 2
  F0 = Main.Model.ke_1* Main.Model.ke_2*Main.Model.ke_3*Main.Model.ke_4*Main.Model.ke_5*Main.Model.ke_6*Main.Model.k_glb*Main.Model.k141*.StrengthScaleUlna*PCSA*.ConstParam.MusStress;
};

AnyMuscleModel Flexor_Digitorum_Superficialis_Digit2 = {
  AnyVar PCSA = 140; //mm^2 Lieber 2
  F0 = Main.Model.ke_1* Main.Model.ke_2*Main.Model.ke_3*Main.Model.ke_4*Main.Model.ke_5*Main.Model.ke_6*Main.Model.k_glb*Main.Model.k142*.StrengthScaleUlna*PCSA*.ConstParam.MusStress;
};


AnyMuscleModel Flexor_Digitorum_Profundus_Digit5 = {
  AnyVar PCSA = 180; //mm^2 Lieber 2
  F0 = Main.Model.ke_1* Main.Model.ke_2*Main.Model.ke_3*Main.Model.ke_4*Main.Model.ke_5*Main.Model.ke_6*Main.Model.k_glb*Main.Model.k143*.StrengthScaleUlna*PCSA*.ConstParam.MusStress;
};


AnyMuscleModel Flexor_Digitorum_Profundus_Digit4 = {
  AnyVar PCSA = 140; //mm^2 Lieber 2
  F0 = Main.Model.ke_1* Main.Model.ke_2*Main.Model.ke_3*Main.Model.ke_4*Main.Model.ke_5*Main.Model.ke_6*Main.Model.k_glb*Main.Model.k144*.StrengthScaleUlna*PCSA*.ConstParam.MusStress;
};

AnyMuscleModel Flexor_Digitorum_Profundus_Digit3 = {
  AnyVar PCSA = 180; //mm^2 Lieber 2
  F0 = Main.Model.ke_1* Main.Model.ke_2*Main.Model.ke_3*Main.Model.ke_4*Main.Model.ke_5*Main.Model.ke_6*Main.Model.k_glb*Main.Model.k145*.StrengthScaleUlna*PCSA*.ConstParam.MusStress;
};

AnyMuscleModel Flexor_Digitorum_Profundus_Digit2 = {
  AnyVar PCSA = 150; //mm^2 Lieber 2
  F0 = Main.Model.ke_1* Main.Model.ke_2*Main.Model.ke_3*Main.Model.ke_4*Main.Model.ke_5*Main.Model.ke_6*Main.Model.k_glb*Main.Model.k146*.StrengthScaleUlna*PCSA*.ConstParam.MusStress;
};


AnyMuscleModel Extensor_Digitorum_Digit5 = {
  AnyVar PCSA = 30; //mm^2 Lieber 2
  F0 = Main.Model.ke_1* Main.Model.ke_2*Main.Model.ke_3*Main.Model.ke_4*Main.Model.ke_5*Main.Model.ke_6*Main.Model.k_glb*Main.Model.k147*.StrengthScaleUlna*PCSA*.ConstParam.MusStress;
};

AnyMuscleModel Extensor_Digitorum_Digit4 = {
  AnyVar PCSA = 80; //mm^2 Lieber 2
  F0 = Main.Model.ke_1* Main.Model.ke_2*Main.Model.ke_3*Main.Model.ke_4*Main.Model.ke_5*Main.Model.ke_6*Main.Model.k_glb*Main.Model.k148*.StrengthScaleUlna*PCSA*.ConstParam.MusStress;
};


AnyMuscleModel Extensor_Digitorum_Digit3 = {
  AnyVar PCSA = 80; //mm^2 Lieber 2
  F0 = Main.Model.ke_1* Main.Model.ke_2*Main.Model.ke_3*Main.Model.ke_4*Main.Model.ke_5*Main.Model.ke_6*Main.Model.k_glb*Main.Model.k149*.StrengthScaleUlna*PCSA*.ConstParam.MusStress;
};

AnyMuscleModel Extensor_Digitorum_Digit2 = {
  AnyVar PCSA = 40; //mm^2 Lieber 2
  F0 = Main.Model.ke_1* Main.Model.ke_2*Main.Model.ke_3*Main.Model.ke_4*Main.Model.ke_5*Main.Model.ke_6*Main.Model.k_glb*Main.Model.k150*.StrengthScaleUlna*PCSA*.ConstParam.MusStress;
};

AnyMuscleModel Extensor_Digiti_Minimi = {
  AnyVar PCSA = 60; //mm^2 Lieber 2
  F0 = Main.Model.ke_1* Main.Model.ke_2*Main.Model.ke_3*Main.Model.ke_4*Main.Model.ke_5*Main.Model.ke_6*Main.Model.k_glb*Main.Model.k151*.StrengthScaleUlna*PCSA*.ConstParam.MusStress;
};

AnyMuscleModel Flexor_Pollicis_Longus = {
  AnyVar PCSA = 170; //mm^2 Lieber 2
  F0 = Main.Model.ke_1* Main.Model.ke_2*Main.Model.ke_3*Main.Model.ke_4*Main.Model.ke_5*Main.Model.ke_6*Main.Model.k_glb*Main.Model.k152*.StrengthScaleUlna*PCSA*.ConstParam.MusStress;
};
