// ----------------------------------------------------------------------------------------------------------------
// BodyPartSetup - generic handling
// ----------------------------------------------------------------------------------------------------------------


// Setup default BM_LEG_MORPHOLOGY and BM_LEG_DATASET for the TLEM models
#ifndef BM_LEG_DATASET
  #if BM_LEG_MODEL == _LEG_MODEL_TLEM2_
  #define BM_LEG_DATASET "TLEM2.1"
  #endif
#endif

#ifndef BM_LEG_DATASET
  #if BM_LEG_MODEL == _LEG_MODEL_TLEM1_
  #define BM_LEG_DATASET "TLEM1.2"
  #endif
#endif

#ifdef BM_LEG_DATASET
  #ifndef BM_LEG_DATASET_PATH
    #path BM_LEG_DATASET_PATH "../../LegTLEM/" + BM_LEG_DATASET
    #include "<BM_LEG_DATASET_PATH>/PreprocDefaults.any"
  #endif
#endif

#ifndef BM_LEG_MORPHOLOGY
  #define BM_LEG_MORPHOLOGY 2
#endif


//
// SCALING related logic
//

#if (BM_SCALING == _SCALING_UNIFORM_EXTMEASUREMENTS_) | (BM_SCALING == _SCALING_LENGTHMASS_EXTMEASUREMENTS_) | (BM_SCALING == _SCALING_LENGTHMASSFAT_EXTMEASUREMENTS_)
  #undef BM_SCALING_STANDARDPARAM_EXTERIOR
  #define BM_SCALING_STANDARDPARAM_EXTERIOR ON
#endif


#ifdef BM_SCALING_FILE
   #if BM_SCALING != _SCALING_CUSTOM_
   AnyInt bm_scaling_ScalingNotice1 = notice(1, "Using a custom scaling law is specified, using `BM_SCALING_FILE`. This overrides the selection by the BM_SCALING parameter")
   #endif
   #undef BM_SCALING
   #define BM_SCALING _SCALING_CUSTOM_
#endif


//Base scaling laws according to the configuration file
#if (BM_SCALING == _SCALING_NONE_)
  #path BM_SCALING_FILE  "<ANYBODY_PATH_BODY>\Scaling\ScalingNone.any"
#endif

#if (BM_SCALING == _SCALING_STANDARD_) | (BM_SCALING == _SCALING_UNIFORM_) | (BM_SCALING == _SCALING_UNIFORM_EXTMEASUREMENTS_)
  #path BM_SCALING_FILE  "<ANYBODY_PATH_BODY>\Scaling\ScalingUniform.any"
#endif

#if (BM_SCALING == _SCALING_LENGTHMASS_) | (BM_SCALING == _SCALING_LENGTHMASS_EXTMEASUREMENTS_)
  #path BM_SCALING_FILE  "<ANYBODY_PATH_BODY>\Scaling\ScalingLengthMass.any"
#endif

#if (BM_SCALING == _SCALING_LENGTHMASSFAT_) | (BM_SCALING == _SCALING_LENGTHMASSFAT_EXTMEASUREMENTS_)
  #path BM_SCALING_FILE  "<ANYBODY_PATH_BODY>\Scaling\ScalingLengthMassFat.any"
#endif

#if BM_SCALING == _SCALING_XYZ_
  #path BM_SCALING_FILE "<ANYBODY_PATH_BODY>\Scaling\ScalingXYZMassFat.any"
#endif
