AnyDoc _AMMR_BETA_INFO_ =
{
   Hidden = On;
   #ifpathexists "../../../../.git"
   #ifpathexists "<ANYBODY_PATH_INSTALLDIR>/Python/python.exe"

   AnyFunEx ReadGitInfo = {
     AnyString Return = {"",""};
     AnyFunExMonoPy git_info = { ModuleFile = "git_info.py"; ArgList = { AnyString gitfolder = "";};};
   };
   AnyString GitInfo = ReadGitInfo("../../../../.git");

   #endif
   #endif
};
