#ifndef ANYBODY_PATH_BODY_GENERICBODYMODEL
  #path ANYBODY_PATH_BODY_GENERICBODYMODEL "<ANYBODY_PATH_BODY>\BodyModels\GenericBodyModel\"
#endif

AnyFolder HumanModel={
  #include "<ANYBODY_PATH_BODY_GENERICBODYMODEL>\BodyModel.defaults.preprocess.any"
  #include "<ANYBODY_PATH_BODY_GENERICBODYMODEL>\BodyModel.defaults.any"
  #include "<ANYBODY_PATH_BODY_GENERICBODYMODEL>\BodyModel.BodyPartsSetup.any"
  #include "<ANYBODY_PATH_BODY_GENERICBODYMODEL>\BodyModel.config_info.any"

  #ifdef BM_SCALING
   #if BM_SCALING != CONST_SCALING_STANDARD
    AnyFolder AnthroDataSubject = { #include "<BM_SCALING_ANTHRO_FILE>" };
    Scaling.Scaling = {AnyFolder& AnthroDataSubjectRef = ..AnthroDataSubject;};
   #endif
  #endif

  AnyFolder BodyModelWithDefaultDrivers = {
    AnyFolder &BodyModel = .BodyModel;
    AnyFolder &Drivers = .DefaultMannequinDrivers;
  };

  #ifdef BM_MANNEQUIN_FILE
    #include "<BM_MANNEQUIN_FILE>"
  #endif

  #if BM_DRAWSETTINGS_SKIP == OFF
  Main = {
    #include "<BM_DRAWSETTINGS_FILE>"
  };
  #endif
  // actual body model


  #include  "<ANYBODY_PATH_BODY_GENERICBODYMODEL>\BodyModel.NEW.any"

  AnyFolder StrengthParameters={
    AnyVar SpecificMuscleTensionSpine= BM_TRUNK_STRENGTH_INDEX*90; //N/cm^2
    AnyVar StrengthIndexLeg= DesignVar(BM_LEG_STRENGTH_INDEX);
    AnyVar SpecificMuscleTensionShoulderArm= BM_ARM_STRENGTH_INDEX*90; //N/cm^2
  };

  // By default there is an option to define a custom scaling law
  #include "<ANYBODY_PATH_BODY>\Scaling\ScalingCustom.any"

  Scaling={
   //Base scaling laws according to the configuration file

   Scaling.StandardParameters = {
     AnyFolder& Trunk_ModelParameters = ...BodyModel.Trunk.ModelParameters;
     #if (RIGHT_LEG_TD | LEFT_LEG_TD | RIGHT_LEG | LEFT_LEG)
       AnyFolder& Leg_ModelParameters = ...BodyModel.Trunk.SegmentsLumbar.PelvisSeg.Leg_ModelParameters;
     #endif
   };

   #if BM_SCALING == CONST_SCALING_CUSTOM
     // include your own custom scaling law, please refer to existing ones for reference
     #include "<BM_SCALING_MY_FILE>"
   #endif


   #if (BM_SCALING == CONST_SCALING_UNIFORM_EXTMEASUREMENTS) | (BM_SCALING == CONST_SCALING_LENGTHMASS_EXTMEASUREMENTS) | (BM_SCALING == CONST_SCALING_LENGTHMASSFAT_EXTMEASUREMENTS)
     #ifndef STANDARDPARAM_EXTERIOR
       #define STANDARDPARAM_EXTERIOR
     #endif
   #endif

   //Base scaling laws according to the configuration file
   #if BM_SCALING == CONST_SCALING_STANDARD
     #include "<ANYBODY_PATH_BODY>\Scaling\ScalingStandard.any"
   #endif

   #if (BM_SCALING == CONST_SCALING_UNIFORM) | (BM_SCALING == CONST_SCALING_UNIFORM_EXTMEASUREMENTS)
     #include "<ANYBODY_PATH_BODY>\Scaling\ScalingUniform.any"
   #endif

   #if (BM_SCALING == CONST_SCALING_LENGTHMASS) | (BM_SCALING == CONST_SCALING_LENGTHMASS_EXTMEASUREMENTS)
     #include "<ANYBODY_PATH_BODY>\Scaling\ScalingLengthMass.any"
   #endif

   #if (BM_SCALING == CONST_SCALING_LENGTHMASSFAT) | (BM_SCALING == CONST_SCALING_LENGTHMASSFAT_EXTMEASUREMENTS)
     #include "<ANYBODY_PATH_BODY>\Scaling\ScalingLengthMassFat.any"
   #endif

   #ifdef STANDARDPARAM_EXTERIOR
     #undef STANDARDPARAM_EXTERIOR
   #endif

   #if BM_SCALING == CONST_SCALING_LENGTHMASSFAT_MULTIDOFS
     #include "<ANYBODY_PATH_BODY>\Scaling\ScalingLengthMassFatModified.any"
     //#include "<ANYBODY_PATH_BODY>\Scaling\ScalingLengthMassFatMultiDofs.any"
   #endif
 };

 AnyFolder DefaultMannequinDrivers = {
   #include "<ANYBODY_PATH_BODY_GENERICBODYMODEL>\BodyModel.MannequinDrivers.any"
 };
};

#include "<ANYBODY_PATH_BODY_GENERICBODYMODEL>\BodyModel.undefine.any"
