/**
Definitions of the Joints in the lumbar spine. From PelvisL5 to T12L1
*/
AnyFolder JointsLumbar = {


  AnySphericalJoint SacrumPelvisJnt = {
    AnyRefNode &PelvisNode = ..SegmentsLumbar.PelvisSeg.PelvisSacrumJntNode;
    AnyRefNode &SacrumNode = ..SegmentsLumbar.SacrumSeg.SacrumPelvisJntNode;

  };
  //There are no muscles attached to sacrum
  AnyReacForce SacrumPelvisReaction = {
    AnySphericalJoint &ref=.SacrumPelvisJnt ;
  };

  AnySphericalJoint L5SacrumJnt = {
    AnyRefNode &SacrumNode = ..SegmentsLumbar.SacrumSeg.SacrumL5JntNode;
    AnyRefNode &L5Node = ..SegmentsLumbar.L5Seg.L5SacrumJntNode;
  };

  AnySphericalJoint L4L5Jnt = {
    AnyRefNode &L5Node = ..SegmentsLumbar.L5Seg.L4L5JntNode;
    AnyRefNode &L4Node = ..SegmentsLumbar.L4Seg.L4L5JntNode;
  };

  AnySphericalJoint L3L4Jnt = {
    AnyRefNode &L4Node = ..SegmentsLumbar.L4Seg.L3L4JntNode;
    AnyRefNode &L3Node = ..SegmentsLumbar.L3Seg.L3L4JntNode;
  };

  AnySphericalJoint L2L3Jnt = {
    AnyRefNode &L3Node = ..SegmentsLumbar.L3Seg.L2L3JntNode;
    AnyRefNode &L2Node = ..SegmentsLumbar.L2Seg.L2L3JntNode;
  };

  AnySphericalJoint L1L2Jnt = {
    AnyRefNode &L2Node = ..SegmentsLumbar.L2Seg.L1L2JntNode;
    AnyRefNode &L1Node = ..SegmentsLumbar.L1Seg.L1L2JntNode;
  };

  AnySphericalJoint T12L1Jnt = {
    AnyRefNode &L1Node = ..SegmentsLumbar.L1Seg.T12L1JntNode;
    AnyRefNode &T12Node = ..SegmentsThorax.T12Seg.T12L1JntNode;
  };

  #if BM_TRUNK_LUMBAR_RHYTHM != OFF

  //Spine rhythm leaves three rotational dof between pelvis and thorax free
  AnyKinEqSimpleDriver SpineRhythmDrv = {

    AnyKinMeasureLinComb Measure =
    {
      AnyJoint &u1 = ..SacrumPelvisJnt;
      AnyJoint &u2 = ..L5SacrumJnt;
      AnyJoint &u3 = ..L4L5Jnt;
      AnyJoint &u4 = ..L3L4Jnt;
      AnyJoint &u5 = ..L2L3Jnt;
      AnyJoint &u6 = ..L1L2Jnt;
      AnyJoint &u7 = ..T12L1Jnt;

      #include "SRMatrixes.any"
     }; // Measure

    #if BM_TRUNK_LUMBAR_RHYTHM == _RHYTHM_SOFT_
      // Use a template to create the weight function, so
      // the weight values can be overridden by the user.
      Template_AnyFunConst Weights (NUMBER_OF_ELEMENTS=..nDim) = {};
      CType= repmat(nDim,Soft);
      WeightFun ={&Weights.Fun};
     #endif


    DriverPos = repmat(nDim, 0);
    DriverVel = repmat(nDim, 0);
    Reaction.Type = repmat(nDim, Off);


  }; // SpineRhythmDrv
  #endif

  //Rotational measure between throax and pelvis
  AnyKinRotational PelvisThoraxRotMeasure = {
    AnyRefFrame &Pelvis = ..SegmentsLumbar.PelvisSeg.AnatomicalFrame;
    AnyRefFrame &Thorax = ..SegmentsThorax.T12Seg.AnatomicalFrame;
    Type = RotVector;
  };


   //Rotational measure between throax and pelvis
   AnyKinRotational PelvisT12RotMeasure = {
    AnyRefFrame &Pelvis = ..SegmentsLumbar.PelvisSeg.AnatomicalFrame;
    AnyRefFrame &Thorax = ..SegmentsThorax.T12Seg.AnatomicalFrame;
    Type = RotVector;
    Axis1 = x;
    Axis2 = y;
    Axis3 = z;
  };
};// End of JointsLumbar
