/**
Definitions of Segments in the Thorax Part of the Spine.

Abbrevitations:
ALL = Anterior Longitudinal Ligament
PLL = Posterior Longitudinal Ligament
LS = Ligamentum Supraspinale
LI = Ligamentum Interspinalia

MF = Multifidi
ILpl = Iliocostalis Lumborum pars lumborum (part of Erector Spinae)
LTpl = Longissimus Thoracis pars lumborum (part of Erector Spinae)
ILpt = Iliocostalis Lumborum pars thoracis (part of Erector Spinae)
LTpt = Longissimus Thoracis pars thoracis (part of Erector Spinae)
PM = Psoas Major
QL = Quadratus Lumborum
RA = Rectus Abdominis
OE = Obliquus Externus
OI = Obliquus Internus

C = Costae
CI = Crista Iliaca
CP = Crista Pubica
SIPS = Spina iliaca posterior superior
SIPI = Spina iliaca Posterior inferior
T = Thoracal hvirvel
L = Lumbal hvirvel
S = Sacral segment
*/
AnyFolder SegmentsThorax = {


  AnySeg ThoraxSeg = {

    AnyFolder &StdPar=..ModelParameters;

    r0=..SegmentsLumbar.L1Seg.T12L1JntNode.sRel*..SegmentsLumbar.L1Seg.Axes0'+..SegmentsLumbar.L1Seg.r0-T12L1JntNode.sRel*Axes0';

    AnyFunTransform3D &Scale =..ScalingTrunk.ThoraxSeg.ScaleFunction;
    AnyVar MassS = ..Scaling.MassScaling.Thorax.MassScale;

    //Mass = 0.216*..BodyParRef.BodyMass; //Mass of Thorax concentrated in the CoM of the Thorax (Winter, 1990)

    AnyVar MassStandard = ..StandardParameters.Trunk.Mass;
    Mass = MassS*MassStandard;

    AnyVar UBHeight =  StdPar.Thorax.UBHeight; //0.50; //Upperbody height
    AnyVar Radius = (Mass/(pi*UBHeight*1000))^0.5;
    AnyVar Ixx = 0.25*Mass*Radius^2 + 1/12*Mass*UBHeight^2;
    AnyVar Izz = Ixx;
    AnyVar Iyy = 0.5*Mass*Radius^2;

    AnyMat33 JMatRot = AnatomicalFrame.ARel*{{Ixx,0,0},{0,Iyy,0},{0,0,Izz}}*AnatomicalFrame.ARel';
    Jii = {JMatRot[0][0], JMatRot[1][1], JMatRot[2][2]};
    Jij = {JMatRot[1][0], JMatRot[2][1], JMatRot[2][0]};


    sCoM = Scale(StdPar.Thorax.sCoM_pos);
    JaboutCoMOnOff = On;

    AnyRefNode AnatomicalFrame = {
      ARel=...SegmentsLumbar.PelvisSeg.AnatomicalFrame.ARel*RotMat(14.5*pi/180,z);
    };
    AnyRefNode& ScalingNode = AnatomicalFrame;
    AnyFunTransform3D& GeomScale = Scale;

    //Incisura jungularis right and left
    //the nodes are used for attachment of ShoulderArm block
    AnyRefNode ij = {
      AnyFloat Mirror = eye(3);
      AnyDrawRefFrame fr = {};
      //This is the standard value for the ij it must be used in order to scale the model
      //since nodes are inserted into this node.
      //If the position of ij are to be adjusted it should be done by changing sRelStd
      AnyVec3 sRelStd = .StdPar.Thorax.ij_pos;

      sRel = .Scale(sRelStd);


      AnyVar angle = 0*(-5)*pi/180;

      ARel= .AnatomicalFrame.ARel*{
        {0,sin(angle), -cos(angle)},
        {0,cos(angle), sin(angle)},
        {1.000000, 0.000000, 0.000000}};

       AnyRefNode scj = { sRel = ..Scale({0.020700, 0.009100, 0.023300});}; // simplified definition
    };

    AnyRefNode iji = {
      AnyFloat Mirror = {
        {-1.000,0.000,0.000},
        {0.000,1.000,0.000},
        {0.000,0.000,1.000}};
      AnyDrawRefFrame fr = {};
      AnyVar angle = 0*(-5)*pi/180;

      //This is the standard value for the ij it must be used in order to scale the model
      //since nodes are inserted into this node.
      //If the position of ij are to be adjusted it should be done by changing sRelS
      AnyVec3 sRelStd = .StdPar.Thorax.iji_pos;

      sRel = .Scale(sRelStd);

      ARel= .AnatomicalFrame.ARel*{
        {0,sin(angle), -cos(angle)},
        {0,cos(angle), sin(angle)},
        {1.000000, 0.000000, 0.000000}};

      AnyRefNode scj = { sRel = ..Scale({-0.020700, 0.009100,  0.023300});}; // simplified definition
    };

    AnyRefNode C1HatNode = {sRel = .Scale(.StdPar.Thorax.C1HatNode_pos);};

    AnyRefNode T1C7JntNode = {sRel = .Scale(.StdPar.Thorax.T1C7JntNode_pos);};
    AnyRefNode T1T2JntNode = {sRel = .Scale(.StdPar.Thorax.T1T2JntNode_pos);};
    AnyRefNode T2T3JntNode = {sRel = .Scale(.StdPar.Thorax.T2T3JntNode_pos);};
    AnyRefNode T3T4JntNode = {sRel = .Scale(.StdPar.Thorax.T3T4JntNode_pos);};
    AnyRefNode T4T5JntNode = {sRel = .Scale(.StdPar.Thorax.T4T5JntNode_pos);};
    AnyRefNode T5T6JntNode = {sRel = .Scale(.StdPar.Thorax.T5T6JntNode_pos);};
    AnyRefNode T6T7JntNode = {sRel = .Scale(.StdPar.Thorax.T6T7JntNode_pos);};
    AnyRefNode T7T8JntNode = {sRel = .Scale(.StdPar.Thorax.T7T8JntNode_pos);};
    AnyRefNode T8T9JntNode = {sRel = .Scale(.StdPar.Thorax.T8T9JntNode_pos);};
    AnyRefNode T9T10JntNode = {sRel = .Scale(.StdPar.Thorax.T9T10JntNode_pos);};
    AnyRefNode T10T11JntNode = {sRel = .Scale(.StdPar.Thorax.T10T11JntNode_pos);};
    AnyRefNode T11T12JntNode = {sRel = .Scale(.StdPar.Thorax.T11T12JntNode_pos);};
    AnyRefNode T12L1JntNode = {sRel = .Scale(.StdPar.Thorax.T12L1JntNode_pos);};

    AnyRefNode CTCVJntNode = {}; ///<placeholder for the rigid thorax
    AnyRefNode CS          = {}; ///<placeholder for the rigid thorax
    AnyRefNode RibNodes = {
      AnyRefNode CTCVJntNodeR = {};
      AnyRefNode CTCVJntNodeL = {};
    };

    AnyRefNode ForceVectorNode = {sRel = .Scale(.StdPar.Thorax.ForceVectorNode_pos);};


    AnyRefNode T1C5Jnt = {sRel = .Scale(.StdPar.Thorax.T1C5Jnt_pos);};

    AnyDrawSurf DrwSurf = {
      FileName = ...STL.FilenameThoraxSegWithoutNeck;
      RGB = ...ColorRef.Segments;
      ScaleXYZ={1.0,1.0,1.0};
      Opacity = Main.DrawSettings.BonesOpacity.Thorax;
      AnyFunTransform3D &Scale =.Scale;
    };

    AnyRefNode Right ={
      AnyInt Sign = 1;
      #include "ThoraxScapulaContactRibPoints.any"
    };
    AnyRefNode Left ={
      AnyInt Sign = -1;
      #include "ThoraxScapulaContactRibPoints.any"
    };

  }; // End of ThoraxSeg

  AnyFolder &T12Seg = ThoraxSeg;
  AnyFolder &T11Seg = ThoraxSeg;
  AnyFolder &T10Seg = ThoraxSeg;
  AnyFolder &T9Seg = ThoraxSeg;
  AnyFolder &T8Seg = ThoraxSeg;
  AnyFolder &T7Seg = ThoraxSeg;
  AnyFolder &T6Seg = ThoraxSeg;
  AnyFolder &T5Seg = ThoraxSeg;
  AnyFolder &T4Seg = ThoraxSeg;
  AnyFolder &T3Seg = ThoraxSeg;
  AnyFolder &T2Seg = ThoraxSeg;
  AnyFolder &T1Seg = ThoraxSeg;


  #if BM_TRUNK_THORACIC_FUTURE == OFF
    AnyFolder &SkullSeg = .SegmentsCervicalSpine.SkullSeg;
  #endif

};

SegmentsRibCage = {

 RibsRight = {

  AnyFolder &R12Seg = ..SegmentsThorax.ThoraxSeg;
  AnyFolder &R11Seg = ..SegmentsThorax.ThoraxSeg;
  AnyFolder &R10Seg = ..SegmentsThorax.ThoraxSeg;
  AnyFolder &R9Seg = ..SegmentsThorax.ThoraxSeg;
  AnyFolder &R8Seg = ..SegmentsThorax.ThoraxSeg;
  AnyFolder &R7Seg = ..SegmentsThorax.ThoraxSeg;
  AnyFolder &R6Seg = ..SegmentsThorax.ThoraxSeg;
  AnyFolder &R5Seg = ..SegmentsThorax.ThoraxSeg;
  AnyFolder &R4Seg = ..SegmentsThorax.ThoraxSeg;
  AnyFolder &R3Seg = ..SegmentsThorax.ThoraxSeg;
  AnyFolder &R2Seg = ..SegmentsThorax.ThoraxSeg;
  AnyFolder &R1Seg = ..SegmentsThorax.ThoraxSeg;

 };

 RibsLeft = {

  AnyFolder &R12Seg = ..SegmentsThorax.ThoraxSeg;
  AnyFolder &R11Seg = ..SegmentsThorax.ThoraxSeg;
  AnyFolder &R10Seg = ..SegmentsThorax.ThoraxSeg;
  AnyFolder &R9Seg = ..SegmentsThorax.ThoraxSeg;
  AnyFolder &R8Seg = ..SegmentsThorax.ThoraxSeg;
  AnyFolder &R7Seg = ..SegmentsThorax.ThoraxSeg;
  AnyFolder &R6Seg = ..SegmentsThorax.ThoraxSeg;
  AnyFolder &R5Seg = ..SegmentsThorax.ThoraxSeg;
  AnyFolder &R4Seg = ..SegmentsThorax.ThoraxSeg;
  AnyFolder &R3Seg = ..SegmentsThorax.ThoraxSeg;
  AnyFolder &R2Seg = ..SegmentsThorax.ThoraxSeg;
  AnyFolder &R1Seg = ..SegmentsThorax.ThoraxSeg;

 };


};
