SelectedOutput.Trunk.Muscles = {
  AnySearchFun MuscleList = {
    #if BM_TRUNK_MUSCLES == OFF
      Search = "....Trunk.JointMuscles.*.*.*.Object.Muscle.*.Activity";
    #else
      Search = {"....Trunk.Muscles.*.*.*.Activity", "....Trunk.Muscles.*.*.Activity"};
    #endif
  };

  AnyFloat MuscleActivities = MuscleList();
  AnyVar Envelope = max(MuscleActivities);
};
