//define = (
//  [
//    {'BM_LEG_RIGHT':'OFF'},
//    {'BM_LEG_RIGHT':'ON'},
//  ],
//  [
//    {'BM_LEG_LEFT':'OFF'},
//    {'BM_LEG_LEFT':'ON'},
//  ],
//  [
//    {'BM_LEG_MODEL':'_LEG_MODEL_Leg_'},
//    {'BM_LEG_MODEL':'_LEG_MODEL_TLEM2_'},
//    {'BM_LEG_MODEL':'_LEG_MODEL_TLEM_'},
//  ],
//  [
//    {'BM_TRUNK_NECK': 'OFF'},
//    {'BM_TRUNK_NECK': 'ON'},
//  ],
//)
//ignore_errors = ['BodyModel.UnhallowedCombination','Model loading skipped']
//
#path ANYBODY_PATH_OUTPUT "."
#include "libdef.any"


Main =
{
  // #path HTML_DOC "<ANYBODY_PATH_BODY>\Documentation\BM_Config\index.html"
  #include "<ANYBODY_PATH_BODY>\HumanModel.any"

  AnyOperationDummy RunApplication = {};
};
