//define = (
//  [
//    {'BM_ARM_LEFT': 'ON'},
//    {'BM_ARM_LEFT': 'OFF'},
//  ],
//  [
//    {'BM_ARM_RIGHT': 'ON'},
//    {'BM_ARM_RIGHT': 'OFF'},
//  ],
//  [
//    {'BM_ARM_DETAILED_HAND': 'OFF'},
//    {'BM_ARM_DETAILED_HAND': 'ON'},
//  ],
//  [
//    {'BM_TRUNK_NECK': 'OFF'},
//    {'BM_TRUNK_NECK': 'ON'},
//  ],
//  [
//    {'BM_ARM_SHOULDER_RHYTHM': 'OFF'},
//    {'BM_ARM_SHOULDER_RHYTHM': 'ON'},
//  ],
//)
//ignore_errors = ['BodyModel.UnhallowedCombination','Model loading skipped']
//
#path ANYBODY_PATH_OUTPUT "."
#include "libdef.any"


Main =
{
  // #path HTML_DOC "<ANYBODY_PATH_BODY>\Documentation\BM_Config\index.html"
  #include "<ANYBODY_PATH_BODY>\HumanModel.any"

  AnyOperationDummy RunApplication = {};
};
