//define = [
//#    {'TLEM_VERSION':'"2.0"'},
//    {'TLEM_VERSION':'"1.1"'},
//]
#define ANYBODY_PATH_OUTPUT "."


#ifndef TEST_NAME
#define TLEM_VERSION "2.0"
#endif


#include "libdef.any"

// ----------------------------------------------------------
// Model configuration:
// For more info on body model configuration options please load the model and double click on:
// #include "<ANYBODY_PATH_BODY>\Documentation\BodyModel.parameters.any"
// ----------------------------------------------------------

#define BM_ARM_RIGHT OFF
#define BM_ARM_LEFT OFF


// Use interpolation drivers to define motion
#define DriverSelection "FreePostureMove"

// actual model
#include "DynamicTest/FreePostureFullBodyStatic.Main.any"
Main = {


  Main.Study ={

    AnyInt test1= assert(ltfun(Main.Study.SymmetryCheck.Leg.Muscle.Comparison.MaxFtDif,0.2),
    "Leg model symmetry");


  };


  AnyOperation& RunTest = Main.RunApplication;
};
