#define ANYBODY_PATH_OUTPUT "."


#include "libdef.any"

// ----------------------------------------------------------
// Model configuration:
// For more info on body model configuration options please load the model and double click on:
// #path HTML_DOC "<ANYBODY_PATH_BODY>\Documentation\BM_Config\index.html"
// ----------------------------------------------------------


#define BM_LEG_RIGHT OFF
#define BM_LEG_LEFT OFF


  // Switch on neck
  #define BM_TRUNK_NECK ON
  // Switch muscles only on the neck
  #define BM_ARM_MUSCLES_ONLY_ON_NECK_RIGHT CONST_MUSCLES_SIMPLE
  #define BM_ARM_MUSCLES_ONLY_ON_NECK_LEFT  CONST_MUSCLES_SIMPLE
  #define BM_TRUNK_NECK_SIMPLE_MUSCLES_ONLY_ON_NECK ON


// Use interpolation drivers to define motion
#define DriverSelection "FreePostureMove"

// actual model
#include "DynamicTest/FreePostureFullBodyStatic.Main.any"
Main = {


  Main.Study ={

    AnyInt test1= assert(ltfun(Main.Study.SymmetryCheck.Trunk.Muscle.Comparison.MaxFtDif,0.2),
    "Trunk model symmetry");


  };


  AnyOperation& RunTest = Main.RunApplication;
};
