#ifndef TESTS_TEST_TOOLS_ANY
#define TESTS_TEST_TOOLS_ANY


#define EXPECT_RANGE(NAME, VAR, MIN, MAX, TRIGGER, MESSAGE) AnyInt Expect_Range_##NAME = expect( orfun( not(Main.TestTrigger),  andfun(ltfun(VAR, MAX)  ,gtfun(VAR, MIN)  )  ), MESSAGE )

#define OPERATION_TEST_TRIGGER(OPR, TRIGGER) Main = { \
  OPR = \
  {\
    AnyOperationSetValue SetTestTrigger = \
    {\
      AnyInt dummyOne = 1;\
      Source = {&dummyOne};\
      Target = {&TRIGGER};\
    };  \
  };\
  \
}

#endif
